Simulations: Version=183
  Simulation
    Clock: Start=2023-01-01; End=2023-12-31
    Summary
    Weather: Latitude=40.764; Tav=10.5701; Amp=29.1048
      FileName=C:/Users/cmg3/Documents/GitHub/SCT/apsimx_output/met/loc_9.met
    SoilArbitrator
    MicroClimate: a_interception=0; b_interception=1; c_interception=0; d_interception=0; SoilHeatFluxFraction=0; MinimumHeightDiffForNewLayer=0; NightInterceptionFraction=0; ReferenceHeight=2
    Zone Field: Area=1; Slope=0; AspectAngle=0; Altitude=50
      Fertiliser
      Soil Sebewa:160684: SoilType=Sebewa:160684; State=IN; Country=USA; ApsoilNumber=0; Latitude=41.4444; Longitude=-86.9437
        DataSource=SSURGO (https://sdmdataaccess.nrcs.usda.gov/) through R package soilDB, R package apsimx function ssurgo2sp. Timestamp 2025-02-24 14:26:14.116362
        Comments=cokey = 25183709 - acres percent = 100 - component percent = 100 - taxonomic classification name = Fine-loamy over sandy or sandy-skeletal, mixed, superactive, mesic Typic Argiaquolls - drainage class = Very poorly drained - elevation = 220.4 - slope = 1 - geomdesc = NA
        Physical
          Thickness  ParticleSizeSand  ParticleSizeSilt  ParticleSizeClay  BD       AirDry      LL15        DUL        SAT       KS
          200        47                30                23                1.60087  0.0695023   0.139005    0.254187   0.394897  792.288
          200        47                30                23                1.60087  0.0695023   0.139005    0.254187   0.394897  792.288
          200        47                30                23                1.60087  0.0695023   0.139005    0.254187   0.394897  792.288
          200        45                28                27                1.58148  0.16251286  0.16251286  0.279525   0.402216  792.288
          200        45                28                27                1.58148  0.16251286  0.16251286  0.279525   0.402216  792.288
          200        45                28                27                1.58148  0.16251286  0.16251286  0.279525   0.402216  792.288
          200        87                9                 4                 1.56865  0.0164727   0.0164727   0.0641573  0.407056  7926.336
          200        87                9                 4                 1.56865  0.0164727   0.0164727   0.0641573  0.407056  7926.336
          200        87                9                 4                 1.56865  0.0164727   0.0164727   0.0641573  0.407056  7926.336
          200        87                9                 4                 1.56865  0.0164727   0.0164727   0.0641573  0.407056  7926.336
          SoilCrop MaizeSoil
            LL=[0.139005, 0.139005, 0.139005, 0.16251286, 0.16251286, 0.16251286, 0.0164727, 0.0164727, 0.0164727, 0.0164727]
            KL=[0.06, 0.0491238, 0.0402192, 0.0329287, 0.0269597, 0.0220728, 0.0180717, 0.0147958, 0.0121138, 0.00991793]
            XF=[1, 1, 1, 1, 1, 1, 1, 1, 1, 1]
          SoilCrop SoybeanSoil: same as Simulation.Field.Sebewa:160684.Physical.MaizeSoil
          SoilCrop WheatSoil: same as Simulation.Field.Sebewa:160684.Physical.MaizeSoil
        WaterBalance SoilWater: SummerDate=1-Jun; SummerU=9.05; SummerCona=4; WinterDate=1-Nov; WinterU=9.05; WinterCona=4; DiffusConst=40; DiffusSlope=16; Salb=0.15; CN2Bare=78; CNRed=20; CNCov=0.8; PSIDul=-100; Thickness=[200, 200, 200, 200, 200, 200, 200, 200, 200, 200]
          SWCON=[0.357946, 0.357946, 0.357946, 0.306762, 0.306762, 0.306762, 0.842773, 0.842773, 0.842773, 0.842773]
        Organic: FOMCNRatio=40; CarbonUnits=Total
          Thickness  Carbon    SoilCNRatio  FBiom       FInert    FOM
          200        2.03488   12           0.04        0.8       150
          200        2.03488   12           0.0327492   0.80804   122.81
          200        2.03488   12           0.0268128   0.816161  100.548
          200        0.726744  12           0.0219525   0.824364  82.3217
          200        0.726744  12           0.0179732   0.832649  67.3993
          200        0.726744  12           0.0147152   0.841017  55.1819
          200        0.145349  12           0.0120478   0.849469  45.1791
          200        0.145349  12           0.00986388  0.858007  36.9895
          200        0.145349  12           0.00807586  0.86663   30.2845
          200        0.145349  12           0.00661196  0.875339  24.7948
        Chemical: Thickness=[200, 200, 200, 200, 200, 200, 200, 200, 200, 200]; PH=[6.5, 6.5, 6.5, 6.5, 6.5, 6.5, 6.5, 6.5, 6.5, 6.5]; PHUnits=Water
        Water: Thickness=[200, 200, 200, 200, 200, 200, 200, 200, 200, 200]; InitialPAWmm=361.05; RelativeTo=LL15; FilledFromTop=false
          InitialValues=[0.254187, 0.254187, 0.254187, 0.279525, 0.279525, 0.279525, 0.0641573, 0.0641573, 0.0641573, 0.0641573]
        CERESSoilTemperature Temperature
        Nutrient
        Solute NO3: Thickness=[200, 200, 200, 200, 200, 200, 200, 200, 200, 200]; InitialValuesUnits=ppm; WaterTableConcentration=0; D0=0; DepthConstant=0; MaxDepthSoluteAccessible=0; RunoffEffectivenessAtMovingSolute=0; MaxEffectiveRunoff=0
          InitialValues=[0.5, 0.495025, 0.490099, 0.485223, 0.480395, 0.475615, 0.470882, 0.466197, 0.461558, 0.456966]
        Solute NH4: Thickness=[200, 200, 200, 200, 200, 200, 200, 200, 200, 200]; InitialValuesUnits=ppm; WaterTableConcentration=0; D0=0; DepthConstant=0; MaxDepthSoluteAccessible=0; RunoffEffectivenessAtMovingSolute=0; MaxEffectiveRunoff=0
          InitialValues=[0.05, 0.0495025, 0.0490099, 0.0485223, 0.0480395, 0.0475615, 0.0470882, 0.0466197, 0.0461558, 0.0456966]
        Solute Urea: Thickness=[150, 150, 300, 300, 300, 300, 300]; InitialValues=[0, 0, 0, 0, 0, 0, 0]; InitialValuesUnits=kg/ha; WaterTableConcentration=0; D0=0; DepthConstant=0; MaxDepthSoluteAccessible=0; RunoffEffectivenessAtMovingSolute=0; MaxEffectiveRunoff=0
      Plant Soybean
        Cultivar early000
          Command:
            [Phenology].Vegetative.Target.FixedValue = 289
            [Phenology].EarlyFlowering.Target.FixedValue = 171
            [Phenology].EarlyPodDevelopment.Target.FixedValue = 210
            [Phenology].LateGrainFilling.Target.EntireGrainfillPeriod.FixedValue = 173
            [Phenology].Maturing.Target.FixedValue = 158
            [Phenology].Ripening.Target.FixedValue = 42
            [Phenology].VegetativePhotoperiodModifier.XYPairs.X = 14.57, 22.31
            [Phenology].ReproductivePhotoperiodModifier.XYPairs.X = 14.57, 22.31
        Cultivar mid000
          Command:
            [Phenology].Vegetative.Target.FixedValue = -384
            [Phenology].EarlyFlowering.Target.FixedValue = 165
            [Phenology].EarlyPodDevelopment.Target.FixedValue = 205
            [Phenology].LateGrainFilling.Target.EntireGrainfillPeriod.FixedValue = 171
            [Phenology].Maturing.Target.FixedValue = 156
            [Phenology].Ripening.Target.FixedValue = 40
            [Phenology].VegetativePhotoperiodModifier.XYPairs.X = 14.48, 21.82
            [Phenology].ReproductivePhotoperiodModifier.XYPairs.X = 14.48, 21.82
        Cultivar late000
          Command:
            [Phenology].Vegetative.Target.FixedValue = 288
            [Phenology].EarlyFlowering.Target.FixedValue = 187
            [Phenology].EarlyPodDevelopment.Target.FixedValue = 227
            [Phenology].LateGrainFilling.Target.EntireGrainfillPeriod.FixedValue = 181
            [Phenology].Maturing.Target.FixedValue = 166
            [Phenology].Ripening.Target.FixedValue = 51
            [Phenology].VegetativePhotoperiodModifier.XYPairs.X = 14.4, 21.35
            [Phenology].ReproductivePhotoperiodModifier.XYPairs.X = 14.4, 21.35
        Cultivar early00
          Command:
            [Phenology].Vegetative.Target.FixedValue = 284
            [Phenology].EarlyFlowering.Target.FixedValue = 167
            [Phenology].EarlyPodDevelopment.Target.FixedValue = 206
            [Phenology].LateGrainFilling.Target.EntireGrainfillPeriod.FixedValue = 171
            [Phenology].Maturing.Target.FixedValue = 156
            [Phenology].Ripening.Target.FixedValue = 40
            [Phenology].VegetativePhotoperiodModifier.XYPairs.X = 14.31, 20.9
            [Phenology].ReproductivePhotoperiodModifier.XYPairs.X = 14.31, 20.9
        Cultivar mid00
          Command:
            [Phenology].Vegetative.Target.FixedValue = 301
            [Phenology].EarlyFlowering.Target.FixedValue = 162
            [Phenology].EarlyPodDevelopment.Target.FixedValue = 202
            [Phenology].LateGrainFilling.Target.EntireGrainfillPeriod.FixedValue = 169
            [Phenology].Maturing.Target.FixedValue = 154
            [Phenology].Ripening.Target.FixedValue = 38
            [Phenology].VegetativePhotoperiodModifier.XYPairs.X = 14.23, 20.46
            [Phenology].ReproductivePhotoperiodModifier.XYPairs.X = 14.23, 20.46
        Cultivar late00
          Command:
            [Phenology].Vegetative.Target.FixedValue = 286
            [Phenology].EarlyFlowering.Target.FixedValue = 155
            [Phenology].EarlyPodDevelopment.Target.FixedValue = 195
            [Phenology].LateGrainFilling.Target.EntireGrainfillPeriod.FixedValue = 165
            [Phenology].Maturing.Target.FixedValue = 150
            [Phenology].Ripening.Target.FixedValue = 35
            [Phenology].VegetativePhotoperiodModifier.XYPairs.X = 14.15, 20.05
            [Phenology].ReproductivePhotoperiodModifier.XYPairs.X = 14.15, 20.05
        Cultivar early0
          Command:
            [Phenology].Vegetative.Target.FixedValue = 283
            [Phenology].EarlyFlowering.Target.FixedValue = 153
            [Phenology].EarlyPodDevelopment.Target.FixedValue = 193
            [Phenology].LateGrainFilling.Target.EntireGrainfillPeriod.FixedValue = 164
            [Phenology].Maturing.Target.FixedValue = 150
            [Phenology].Ripening.Target.FixedValue = 34
            [Phenology].VegetativePhotoperiodModifier.XYPairs.X = 14.06, 19.65
            [Phenology].ReproductivePhotoperiodModifier.XYPairs.X = 14.06, 19.65
        Cultivar mid0
          Command:
            [Phenology].Vegetative.Target.FixedValue = 292
            [Phenology].EarlyFlowering.Target.FixedValue = 159
            [Phenology].EarlyPodDevelopment.Target.FixedValue = 198
            [Phenology].LateGrainFilling.Target.EntireGrainfillPeriod.FixedValue = 167
            [Phenology].Maturing.Target.FixedValue = 152
            [Phenology].Ripening.Target.FixedValue = 36
            [Phenology].VegetativePhotoperiodModifier.XYPairs.X = 13.98, 19.27
            [Phenology].ReproductivePhotoperiodModifier.XYPairs.X = 13.98, 19.27
        Cultivar late0
          Command:
            [Phenology].Vegetative.Target.FixedValue = 311
            [Phenology].EarlyFlowering.Target.FixedValue = 174
            [Phenology].EarlyPodDevelopment.Target.FixedValue = 214
            [Phenology].LateGrainFilling.Target.EntireGrainfillPeriod.FixedValue = 175
            [Phenology].Maturing.Target.FixedValue = 160
            [Phenology].Ripening.Target.FixedValue = 44
            [Phenology].VegetativePhotoperiodModifier.XYPairs.X = 13.89, 18.91
            [Phenology].ReproductivePhotoperiodModifier.XYPairs.X = 13.89, 18.91
        Cultivar early1
          Command:
            [Phenology].Vegetative.Target.FixedValue = 297
            [Phenology].EarlyFlowering.Target.FixedValue = 173
            [Phenology].EarlyPodDevelopment.Target.FixedValue = 212
            [Phenology].LateGrainFilling.Target.EntireGrainfillPeriod.FixedValue = 174
            [Phenology].Maturing.Target.FixedValue = 159
            [Phenology].Ripening.Target.FixedValue = 43
            [Phenology].VegetativePhotoperiodModifier.XYPairs.X = 13.81, 18.57
            [Phenology].ReproductivePhotoperiodModifier.XYPairs.X = 13.81, 18.57
        Cultivar mid1
          Command:
            [Phenology].Vegetative.Target.FixedValue = 309
            [Phenology].EarlyFlowering.Target.FixedValue = 181
            [Phenology].EarlyPodDevelopment.Target.FixedValue = 221
            [Phenology].LateGrainFilling.Target.EntireGrainfillPeriod.FixedValue = 178
            [Phenology].Maturing.Target.FixedValue = 163
            [Phenology].Ripening.Target.FixedValue = 48
            [Phenology].VegetativePhotoperiodModifier.XYPairs.X = 13.73, 18.25
            [Phenology].ReproductivePhotoperiodModifier.XYPairs.X = 13.73, 18.25
        Cultivar late1
          Command:
            [Phenology].Vegetative.Target.FixedValue = 315
            [Phenology].EarlyFlowering.Target.FixedValue = 196
            [Phenology].EarlyPodDevelopment.Target.FixedValue = 235
            [Phenology].LateGrainFilling.Target.EntireGrainfillPeriod.FixedValue = 186
            [Phenology].Maturing.Target.FixedValue = 171
            [Phenology].Ripening.Target.FixedValue = 55
            [Phenology].VegetativePhotoperiodModifier.XYPairs.X = 13.64, 17.94
            [Phenology].ReproductivePhotoperiodModifier.XYPairs.X = 13.64, 17.94
        Cultivar early2
          Command:
            [Phenology].Vegetative.Target.FixedValue = 293
            [Phenology].EarlyFlowering.Target.FixedValue = 181
            [Phenology].EarlyPodDevelopment.Target.FixedValue = 221
            [Phenology].LateGrainFilling.Target.EntireGrainfillPeriod.FixedValue = 178
            [Phenology].Maturing.Target.FixedValue = 163
            [Phenology].Ripening.Target.FixedValue = 48
            [Phenology].VegetativePhotoperiodModifier.XYPairs.X = 13.56, 17.66
            [Phenology].ReproductivePhotoperiodModifier.XYPairs.X = 13.56, 17.66
        Cultivar mid2
          Command:
            [Phenology].Vegetative.Target.FixedValue = 299
            [Phenology].EarlyFlowering.Target.FixedValue = 191
            [Phenology].EarlyPodDevelopment.Target.FixedValue = 230
            [Phenology].LateGrainFilling.Target.EntireGrainfillPeriod.FixedValue = 183
            [Phenology].Maturing.Target.FixedValue = 168
            [Phenology].Ripening.Target.FixedValue = 53
            [Phenology].VegetativePhotoperiodModifier.XYPairs.X = 13.47, 17.39
            [Phenology].ReproductivePhotoperiodModifier.XYPairs.X = 13.47, 17.39
        Cultivar late2
          Command:
            [Phenology].Vegetative.Target.FixedValue = 314
            [Phenology].EarlyFlowering.Target.FixedValue = 207
            [Phenology].EarlyPodDevelopment.Target.FixedValue = 246
            [Phenology].LateGrainFilling.Target.EntireGrainfillPeriod.FixedValue = 191
            [Phenology].Maturing.Target.FixedValue = 176
            [Phenology].Ripening.Target.FixedValue = 60
            [Phenology].VegetativePhotoperiodModifier.XYPairs.X = 13.39, 17.14
            [Phenology].ReproductivePhotoperiodModifier.XYPairs.X = 13.39, 17.14
        Cultivar early3
          Command:
            [Phenology].Vegetative.Target.FixedValue = 294
            [Phenology].EarlyFlowering.Target.FixedValue = 198
            [Phenology].EarlyPodDevelopment.Target.FixedValue = 237
            [Phenology].LateGrainFilling.Target.EntireGrainfillPeriod.FixedValue = 187
            [Phenology].Maturing.Target.FixedValue = 172
            [Phenology].Ripening.Target.FixedValue = 56
            [Phenology].VegetativePhotoperiodModifier.XYPairs.X = 13.3, 16.91
            [Phenology].ReproductivePhotoperiodModifier.XYPairs.X = 13.3, 16.91
        Cultivar mid3
          Command:
            [Phenology].Vegetative.Target.FixedValue = 301
            [Phenology].EarlyFlowering.Target.FixedValue = 216
            [Phenology].EarlyPodDevelopment.Target.FixedValue = 256
            [Phenology].LateGrainFilling.Target.EntireGrainfillPeriod.FixedValue = 196
            [Phenology].Maturing.Target.FixedValue = 181
            [Phenology].Ripening.Target.FixedValue = 65
            [Phenology].VegetativePhotoperiodModifier.XYPairs.X = 13.22, 16.7
            [Phenology].ReproductivePhotoperiodModifier.XYPairs.X = 13.22, 16.7
        Cultivar late3
          Command:
            [Phenology].Vegetative.Target.FixedValue = 317
            [Phenology].EarlyFlowering.Target.FixedValue = 229
            [Phenology].EarlyPodDevelopment.Target.FixedValue = 268
            [Phenology].LateGrainFilling.Target.EntireGrainfillPeriod.FixedValue = 202
            [Phenology].Maturing.Target.FixedValue = 187
            [Phenology].Ripening.Target.FixedValue = 72
            [Phenology].VegetativePhotoperiodModifier.XYPairs.X = 13.14, 16.51
            [Phenology].ReproductivePhotoperiodModifier.XYPairs.X = 13.14, 16.51
        Cultivar early4
          Command:
            [Phenology].Vegetative.Target.FixedValue = 311
            [Phenology].EarlyFlowering.Target.FixedValue = 220
            [Phenology].EarlyPodDevelopment.Target.FixedValue = 260
            [Phenology].LateGrainFilling.Target.EntireGrainfillPeriod.FixedValue = 198
            [Phenology].Maturing.Target.FixedValue = 183
            [Phenology].Ripening.Target.FixedValue = 67
            [Phenology].VegetativePhotoperiodModifier.XYPairs.X = 13.05, 16.33
            [Phenology].ReproductivePhotoperiodModifier.XYPairs.X = 13.05, 16.33
        Cultivar mid4
          Command:
            [Phenology].Vegetative.Target.FixedValue = 326
            [Phenology].EarlyFlowering.Target.FixedValue = 242
            [Phenology].EarlyPodDevelopment.Target.FixedValue = 281
            [Phenology].LateGrainFilling.Target.EntireGrainfillPeriod.FixedValue = 209
            [Phenology].Maturing.Target.FixedValue = 194
            [Phenology].Ripening.Target.FixedValue = 78
            [Phenology].VegetativePhotoperiodModifier.XYPairs.X = 12.97, 16.18
            [Phenology].ReproductivePhotoperiodModifier.XYPairs.X = 12.97, 16.18
        Cultivar late4
          Command:
            [Phenology].Vegetative.Target.FixedValue = 346
            [Phenology].EarlyFlowering.Target.FixedValue = 250
            [Phenology].EarlyPodDevelopment.Target.FixedValue = 289
            [Phenology].LateGrainFilling.Target.EntireGrainfillPeriod.FixedValue = 213
            [Phenology].Maturing.Target.FixedValue = 198
            [Phenology].Ripening.Target.FixedValue = 82
            [Phenology].VegetativePhotoperiodModifier.XYPairs.X = 12.88, 16.04
            [Phenology].ReproductivePhotoperiodModifier.XYPairs.X = 12.88, 16.04
        Cultivar early5
          Command:
            [Phenology].Vegetative.Target.FixedValue = 331
            [Phenology].EarlyFlowering.Target.FixedValue = 246
            [Phenology].EarlyPodDevelopment.Target.FixedValue = 285
            [Phenology].LateGrainFilling.Target.EntireGrainfillPeriod.FixedValue = 211
            [Phenology].Maturing.Target.FixedValue = 196
            [Phenology].Ripening.Target.FixedValue = 80
            [Phenology].VegetativePhotoperiodModifier.XYPairs.X = 12.8, 15.92
            [Phenology].ReproductivePhotoperiodModifier.XYPairs.X = 12.8, 15.92
        Cultivar mid5
          Command:
            [Phenology].Vegetative.Target.FixedValue = 372
            [Phenology].EarlyFlowering.Target.FixedValue = 246
            [Phenology].EarlyPodDevelopment.Target.FixedValue = 285
            [Phenology].LateGrainFilling.Target.EntireGrainfillPeriod.FixedValue = 211
            [Phenology].Maturing.Target.FixedValue = 196
            [Phenology].Ripening.Target.FixedValue = 80
            [Phenology].VegetativePhotoperiodModifier.XYPairs.X = 12.72, 15.82
            [Phenology].ReproductivePhotoperiodModifier.XYPairs.X = 12.72, 15.82
        Cultivar late5
          Command:
            [Phenology].Vegetative.Target.FixedValue = 373
            [Phenology].EarlyFlowering.Target.FixedValue = 235
            [Phenology].EarlyPodDevelopment.Target.FixedValue = 274
            [Phenology].LateGrainFilling.Target.EntireGrainfillPeriod.FixedValue = 205
            [Phenology].Maturing.Target.FixedValue = 190
            [Phenology].Ripening.Target.FixedValue = 75
            [Phenology].VegetativePhotoperiodModifier.XYPairs.X = 12.63, 15.74
            [Phenology].ReproductivePhotoperiodModifier.XYPairs.X = 12.63, 15.74
        Cultivar early6
          Command:
            [Phenology].Vegetative.Target.FixedValue = 340
            [Phenology].EarlyFlowering.Target.FixedValue = 215
            [Phenology].EarlyPodDevelopment.Target.FixedValue = 255
            [Phenology].LateGrainFilling.Target.EntireGrainfillPeriod.FixedValue = 195
            [Phenology].Maturing.Target.FixedValue = 180
            [Phenology].Ripening.Target.FixedValue = 65
            [Phenology].VegetativePhotoperiodModifier.XYPairs.X = 12.55, 15.67
            [Phenology].ReproductivePhotoperiodModifier.XYPairs.X = 12.55, 15.67
        Cultivar mid6
          Command:
            [Phenology].Vegetative.Target.FixedValue = 317
            [Phenology].EarlyFlowering.Target.FixedValue = 209
            [Phenology].EarlyPodDevelopment.Target.FixedValue = 248
            [Phenology].LateGrainFilling.Target.EntireGrainfillPeriod.FixedValue = 192
            [Phenology].Maturing.Target.FixedValue = 177
            [Phenology].Ripening.Target.FixedValue = 61
            [Phenology].VegetativePhotoperiodModifier.XYPairs.X = 12.46, 15.63
            [Phenology].ReproductivePhotoperiodModifier.XYPairs.X = 12.46, 15.63
        Cultivar late6
          Command:
            [Phenology].Vegetative.Target.FixedValue = 335
            [Phenology].EarlyFlowering.Target.FixedValue = 214
            [Phenology].EarlyPodDevelopment.Target.FixedValue = 253
            [Phenology].LateGrainFilling.Target.EntireGrainfillPeriod.FixedValue = 195
            [Phenology].Maturing.Target.FixedValue = 180
            [Phenology].Ripening.Target.FixedValue = 64
            [Phenology].VegetativePhotoperiodModifier.XYPairs.X = 12.38, 15.6
            [Phenology].ReproductivePhotoperiodModifier.XYPairs.X = 12.38, 15.6
        Cultivar early7
          Command:
            [Phenology].Vegetative.Target.FixedValue = 270
            [Phenology].EarlyFlowering.Target.FixedValue = 123
            [Phenology].EarlyPodDevelopment.Target.FixedValue = 163
            [Phenology].LateGrainFilling.Target.EntireGrainfillPeriod.FixedValue = 150
            [Phenology].Maturing.Target.FixedValue = 135
            [Phenology].Ripening.Target.FixedValue = 19
            [Phenology].VegetativePhotoperiodModifier.XYPairs.X = 12.29, 15.6
            [Phenology].ReproductivePhotoperiodModifier.XYPairs.X = 12.29, 15.6
        Cultivar mid7
          Command:
            [Phenology].Vegetative.Target.FixedValue = 186
            [Phenology].EarlyFlowering.Target.FixedValue = 94
            [Phenology].EarlyPodDevelopment.Target.FixedValue = 133
            [Phenology].LateGrainFilling.Target.EntireGrainfillPeriod.FixedValue = 135
            [Phenology].Maturing.Target.FixedValue = 120
            [Phenology].Ripening.Target.FixedValue = 4
            [Phenology].VegetativePhotoperiodModifier.XYPairs.X = 12.21, 15.61
            [Phenology].ReproductivePhotoperiodModifier.XYPairs.X = 12.21, 15.61
        Cultivar late7
          Command:
            [Phenology].Vegetative.Target.FixedValue = 177
            [Phenology].EarlyFlowering.Target.FixedValue = 84
            [Phenology].EarlyPodDevelopment.Target.FixedValue = 123
            [Phenology].LateGrainFilling.Target.EntireGrainfillPeriod.FixedValue = 130
            [Phenology].Maturing.Target.FixedValue = 115
            [Phenology].Ripening.Target.FixedValue = 1
            [Phenology].VegetativePhotoperiodModifier.XYPairs.X = 12.13, 15.64
            [Phenology].ReproductivePhotoperiodModifier.XYPairs.X = 12.13, 15.64
      SurfaceOrganicMatter: InitialResidueName=soybean; InitialResidueType=soybean; InitialResidueMass=2000; InitialStandingFraction=0.2; InitialCPR=0; InitialCNR=20
      Manager Sowing
        Crop = [Soybean]
        SowDate = NA
        StartDate = 15-march
        EndDate = 31-may
        MinESW = 100
        MinRain = 25
        RainDays = 7
        SowTemp = 13
        CultivarName = mid000
        SowingDepth = 30
        RowSpacing = 750
        Population = 6
        ForceSow = True
```csharp
using Models.Interfaces;
using APSIM.Shared.Utilities;
using Models.Utilities;
using Models.Soils;
using Models.PMF;
using Models.Core;
using System;
using System.Linq;
using Models.Climate;

namespace Models
{
    [Serializable]
    public class Script : Model
    {
        [Link] private Clock Clock;
        [Link] private Fertiliser Fertiliser;
        [Link] private Summary Summary;
        [Link] private Soil Soil;
        private Accumulator accumulatedRain;
        [Link]
        private ISoilWater waterBalance;
		[Link] private CERESSoilTemperature CST;

        [Description("Crop")]
        public IPlant Crop { get; set; }

		[Separator("If Sowing Date is specified")]
		[Description("Sowing date (d-mmm)")]
        public string SowDate { get; set; }

		[Separator("If Sowing Date is not specified")]
        [Description("Start of sowing window (d-mmm)")]
        public string StartDate { get; set; }

        [Description("End of sowing window (d-mmm)")]
        public string EndDate { get; set; }

        [Description("Minimum extractable soil water for sowing (mm)")]
        public double MinESW { get; set; }

        [Description("Accumulated rainfall required for sowing (mm)")]
        public double MinRain { get; set; }

        [Description("Duration of rainfall accumulation (d)")]
        public int RainDays { get; set; }
        
        [Description("Required soil temp for sowing (C)")]
        public double SowTemp { get; set; } 
        
        [Description("Force sowing by end of window?")]
        public bool ForceSow { get; set; }

		[Separator("Sowing Parameters")]
        [Display(Type = DisplayType.CultivarName)]
        [Description("Cultivar to be sown")]
        public string CultivarName { get; set; }

        [Description("Sowing depth (mm)")]
        public double SowingDepth { get; set; }

        [Description("Row spacing (mm)")]
        public double RowSpacing { get; set; }

        [Description("Plant population (/m2)")]
        public double Population { get; set; }

        
        public string SimSowDate { get; set; }
        public bool SeasonOpen { get; set; }
        
        [EventSubscribe("StartOfSimulation")]
        private void OnSimulationCommencing(object sender, EventArgs e)
        {
            accumulatedRain = new Accumulator(this, "[Weather].Rain", RainDays);
            SeasonOpen = true;
        }

        [EventSubscribe("DoManagement")]
        private void OnDoManagement(object sender, EventArgs e)
        {
            accumulatedRain.Update();
            SimSowDate = "NA";
            bool SowNow = false;
            
            if (SeasonOpen) { // Only allow one attempt at sowing.
                if (SowDate != "NA") {
		            if (DateUtilities.WithinDates(SowDate, Clock.Today, SowDate)) // Sow at date specified.
		            {
		               SowNow = true;
		            }
                } else { 
                    if (DateUtilities.WithinDates(StartDate, Clock.Today, EndDate) && // If no date specified, sow when parameters met. 
		                    !Crop.IsAlive &&
		                    MathUtilities.Sum(waterBalance.ESW) > MinESW &&
		                    accumulatedRain.Sum > MinRain &&
		                    CST.Value[1] >= SowTemp)
		                {
		                    SowNow = true;
		                } 
		            if (ForceSow && // If it's the end of the sowing window and we haven't sown yet, sow. 
		                    !Crop.IsAlive &&
		                    DateUtilities.DatesEqual(EndDate, Clock.Today)) 
		                {
		                    SowNow = true;
		                }
		         }
		     }
		     
		     if (SowNow) {
		        Crop.Sow(population: Population, cultivar: CultivarName, depth: SowingDepth, rowSpacing: RowSpacing);    
		         	   SimSowDate = Clock.Today.ToString("yyyy-MM-dd");
		         	   SeasonOpen = false;
		     }
		     
        }
    }
}
```
      Manager Fertilise at sowing
        Crop = [Soybean]
        FertiliserType = UreaN
        Amount = 220
```csharp
using Models.Soils;
using System;
using System.Linq;
using Models.Core;
using Models.PMF;
namespace Models
{
    [Serializable]
    public class Script : Model
    {
        [Link] Clock Clock;
        [Link] Fertiliser Fertiliser;
        
        [Description("Crop to be fertilised")]
        public IPlant Crop { get; set; }

        [Description("Type of fertiliser to apply? ")] 
        public Fertiliser.Types FertiliserType { get; set; }
    
        [Description("Amount of fertiliser to be applied (kg/ha)")]
        public double Amount { get; set; }
        
        [EventSubscribe("Sowing")]
        private void OnSowing(object sender, EventArgs e)
        {
            Model crop = sender as Model;
            if (Crop != null && crop.Name.ToLower() == (Crop as IModel).Name.ToLower())
                Fertiliser.Apply(Amount: Amount, Type: FertiliserType);
        }
    }
}
```
      Manager Tillage on a fixed date
        TillageDate = 20-mar
        Fraction = 0.4
        Depth = 150
```csharp
using Models.Soils;
using System;
using System.Linq;
using Models.Core;
using Models.PMF;
using APSIM.Shared.Utilities;
using Models.Surface;

namespace Models
{
    [Serializable]
    public class Script : Model
    {
        [Link] Clock Clock;
        [Link] SurfaceOrganicMatter SOM;
        
        [Description("Tillage Date")]
        public string TillageDate { get; set; }
        
        [Description("Fraction of Residues To Incorporate (0-1)")]
        public double Fraction { get; set; }

        [Description("Depth of Tillage (mm)")]
        public double Depth { get; set; }

        [EventSubscribe("DoManagement")]
        private void OnDoManagement(object sender, EventArgs e)
        {
            if (DateUtilities.WithinDates(TillageDate, Clock.Today, TillageDate))
                SOM.Incorporate(Fraction, Depth);
        }
    }
}
```
      Manager ReaperMan
        GermWait = 30
        EmergWait = 30
        LethalFrost = -2.5
        MaxStall = 14
```csharp
using APSIM.Shared.Utilities;
using Models.Utilities;
using Models.Soils;
using Models.PMF;
using Models.Core;
using System;
using System.Linq;
using Models.Functions;
using System.Diagnostics;
using Models.Climate;

namespace Models
{
    [Serializable] 
    public class Script : Model
    {
		[Link] Clock Clock;
        [Link] Zone Zone;
        [Link] Weather Weather;
        [Link] Summary Summary;
        [Link] IEvent Events = null;
        [Link] IPlant Crop;
        
        [Separator("Triggers to kill the crop")]

        [Description("Number of days to wait before killing ungerminated plants")] 
        public int GermWait { get; set; }  
        
        [Description("Number of days to wait before killing unemerged plants")] 
        public int EmergWait { get; set; }  
        
        [Description("Kill if maximum daily tempterature is below (C)")]  
        public double LethalFrost { get; set; }
        
        [Description("Number of days to wait before killing stalled plants")] 
        public int MaxStall { get; set; }  
        public double PrevStage {get; set;}
        public int StalledFor {get; set;}  
        
        private DateTime GerminationDeadline; 
        private DateTime EmergenceDeadline; 
         
        public string SimMatDate {get; set;} 
        public bool WasSown {get; set;}
        public bool MatDateRecorded {get; set;} 
        public string SimHarvestDate {get; set;} 
        public string Result {get; set;}   
        
        [EventSubscribe("StartOfSimulation")]
        private void OnStartOfSimulation(object sender, EventArgs e)
        {
            double PrevStage = 0;
            double StalledFor = 0;
            bool WasSown = false;
        }
        
        [EventSubscribe("Sowing")]
        private void OnSowing(object sender, EventArgs e)
        {
            GerminationDeadline = Clock.Today.AddDays(GermWait);
            EmergenceDeadline = Clock.Today.AddDays(EmergWait);
            WasSown = true;
            MatDateRecorded = false;
            
        }
        
        [EventSubscribe("DoManagement")]
        private void OnDoManagement(object sender, EventArgs e)
        {
  			bool End = false;
  			double Stage = (double)Crop.FindByPath("Phenology.Stage").Value; 
  			Result = "NA";
  			
  			if (Stage >= 10 && MatDateRecorded == false) {
	            SimMatDate = Clock.Today.ToString("yyyy-MM-dd");
	            MatDateRecorded = true;
	        } else {
	        	SimMatDate = "NA";
	        }
  			
            if (Crop.IsReadyForHarvesting)
            {
            	Summary.WriteMessage(this, "Result: Harvested at Maturity.", MessageType.Diagnostic);
                End = true;
                Result = "Harvested at Maturity.";
            } 
            else if (Crop.IsAlive) 
            {
	        	double LAI = (double)Crop.FindByPath("Leaf.LAI").Value; 
	        	        	
		        if (Stage == PrevStage) {
		        	StalledFor += 1;
		        	if (StalledFor >= MaxStall)
		        	{
			        	Summary.WriteMessage(this, "Result: Stalled, killed.", MessageType.Diagnostic);
			        	StalledFor = 0;
			        	PrevStage = 0;
						End = true;
						Result = "Stalled, killed.";
		        	}
		        } 
		        else 
		        {
		       		StalledFor = 0;
		        }
				PrevStage = Stage;

	        	if (Clock.Today == GerminationDeadline && Stage < 2)
	               {
	               Summary.WriteMessage(this, "Result: Failed to Germinate.", MessageType.Diagnostic);
	               End = true;
	               Result = "Failed to Germinate.";
		        }
	            else if (Clock.Today == EmergenceDeadline && Stage < 3)
	               {
	               Summary.WriteMessage(this, "Result: Failed to Emerge.", MessageType.Diagnostic);
				   End = true;
				   Result = "Failed to Emerge.";
		        }
		        else if (Weather.MaxT <= LethalFrost && Stage < 9)
	               {
	               Summary.WriteMessage(this, "Result: Dead from Frost.", MessageType.Diagnostic);
				   End = true;
				   Result = "Dead from Frost.";
		        }
		        else if (LAI <= 0.001 && Stage > 4 && Stage < 9.9)
	               {
	               Summary.WriteMessage(this, "Result: Dead from Total Senescence (0 LAI between Flowering and Maturation).", MessageType.Diagnostic);
				   End = true;
				   Result = "Dead from Total Senescence.";
		        }
	        }
	        
	        if (Clock.Today == Clock.EndDate) {
	            if (!WasSown) { 
                    Summary.WriteMessage(this, "Result: Unable to Meet Sowing Conditions.", MessageType.Diagnostic);
                    Result = "Unable to Meet Sowing Conditions.";
                }
	        }
	        
	        if (End == true) {
				Crop.Harvest();
		        Crop.EndCrop();
	            SimHarvestDate = Clock.Today.ToString("yyyy-MM-dd");
	        } else {
	        	SimHarvestDate = "NA";
	        }
      	}
    }
}
```
      Report: EventNames=[Clock].DoReport
        VariableNames:
          [Clock].Today as Date
          [Clock].Today.Year as Year
          [Clock].Today.DayOfYear as DOY
          [Phenology].CurrentPhaseName as StageName
          [Phenology].Stage as Stage
          [Sowing].Script.SimSowDate as SimSowDate
          [ReaperMan].Script.SimMatDate as SimMatDate
          [ReaperMan].Script.SimHarvestDate as SimHarvestDate
          [Weather].Rain as Rain
          [Weather].Radn as Radn
          [Weather].MaxT as MaxT
          [Weather].MeanT as MeanT
          [Weather].MinT as MinT
          [Soybean].Phenology.ThermalTime as ThermalTime
          [Soybean].Phenology.AccumulatedEmergedTT as AccEmTT
          [Soybean].Grain.Wt*10 as Yieldkgha
          [Leaf].FRGR as FracGrowthRate
          [Photosynthesis].FN as NutrientStress
          [Photosynthesis].FT as TempStress
          [Photosynthesis].FW as WaterStress
          [ReaperMan].Script.Result as Result
  DataStore
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