Simulations: Version=192
  Simulation
    Clock: Start=2018-01-01; End=2019-12-31
    Summary
    Weather: Latitude=40.764; Tav=10.5701; Amp=29.1048
      FileName=C:/Users/cmg3/Documents/GitHub/SCE/output_files/met/loc_3.met
    SoilArbitrator
    MicroClimate: a_interception=0; b_interception=1; c_interception=0; d_interception=0; SoilHeatFluxFraction=0; MinimumHeightDiffForNewLayer=0; NightInterceptionFraction=0; ReferenceHeight=2
    Zone Field: Area=1; Slope=0; AspectAngle=0; Altitude=50
      Fertiliser
      Soil: ASCOrder=Vertosol; ASCSubOrder=Black; SoilType=Clay; Site=Norwin; NearestTown=Norwin; Region=Darling Downs and Granite Belt; State=Queensland; Country=Australia; NaturalVegetation=Qld. Bluegrass, possible Qld. Blue gum; ApsoilNumber=900; Latitude=-27.581836; Longitude=151.320206; LocationAccuracy=+/- 20m; YearOfSampling=0
        DataSource=CSIRO Sustainable Ecosystems, Toowoomba; Characteriesd as part of the GRDC funded project"Doing it better, doing it smarter, managing soil water in Australian agriculture' 2011
        Comments=Clay - OC, CLL for all crops estimated-based on Bongeen Mywybilla Soil No1
        Physical
          Thickness  BD     AirDry  LL15   DUL    SAT    KS
          150        1.011  0.13    0.261  0.521  0.589  20
          150        1.071  0.199   0.248  0.497  0.566  20
          300        1.094  0.28    0.28   0.488  0.557  20
          300        1.159  0.28    0.28   0.48   0.533  20
          300        1.173  0.28    0.28   0.472  0.527  20
          300        1.163  0.28    0.28   0.457  0.531  20
          300        1.187  0.28    0.28   0.452  0.522  20
          SoilCrop SoybeanSoil: LL=[0.261, 0.248, 0.28, 0.306, 0.36, 0.392, 0.446]; KL=[0.06, 0.06, 0.06, 0.04, 0.04, 0.02, 0.01]; XF=[1, 1, 1, 1, 1, 1, 1]
        WaterBalance SoilWater: SummerDate=1-Jun; SummerU=9.05; SummerCona=4; WinterDate=1-Nov; WinterU=9.05; WinterCona=4; DiffusConst=40; DiffusSlope=16; Salb=0.15; CN2Bare=78; CNRed=20; CNCov=0.8; PSIDul=-100; Thickness=[150, 150, 300, 300, 300, 300, 300]; SWCON=[0.3, 0.3, 0.3, 0.3, 0.3, 0.3, 0.3]
        Organic: FOMCNRatio=40; CarbonUnits=Total
          Thickness  Carbon  SoilCNRatio  FBiom  FInert  FOM
          150        1.2     12           0.04   0.4     347.129
          150        0.96    12           0.02   0.6     270.344
          300        0.6     12           0.02   0.8     163.972
          300        0.3     12           0.02   1       99.454
          300        0.18    12           0.01   1       60.322
          300        0.12    12           0.01   1       36.587
          300        0.12    12           0.01   1       22.191
        Chemical: Thickness=[150, 150, 300, 300, 300, 300, 300]; PH=[8, 8, 8, 8, 8, 8, 8]; PHUnits=Water
        Water: Thickness=[150, 150, 300, 300, 300, 300, 300]; InitialValues=[0.521, 0.497, 0.488, 0.48, 0.472, 0.457, 0.452]; InitialPAWmm=361.05; RelativeTo=LL15; FilledFromTop=false
        Nutrient
        Solute NO3: Thickness=[150, 150, 300, 300, 300, 300, 300]; InitialValues=[1, 1, 1, 1, 1, 1, 1]; InitialValuesUnits=ppm; WaterTableConcentration=0; D0=0; DepthConstant=0; MaxDepthSoluteAccessible=0; RunoffEffectivenessAtMovingSolute=0; MaxEffectiveRunoff=0
        Solute NH4: Thickness=[150, 150, 300, 300, 300, 300, 300]; InitialValues=[0.1, 0.1, 0.1, 0.1, 0.1, 0.1, 0.1]; InitialValuesUnits=ppm; WaterTableConcentration=0; D0=0; DepthConstant=0; MaxDepthSoluteAccessible=0; RunoffEffectivenessAtMovingSolute=0; MaxEffectiveRunoff=0
        Solute Urea: Thickness=[150, 150, 300, 300, 300, 300, 300]; InitialValues=[0, 0, 0, 0, 0, 0, 0]; InitialValuesUnits=kg/ha; WaterTableConcentration=0; D0=0; DepthConstant=0; MaxDepthSoluteAccessible=0; RunoffEffectivenessAtMovingSolute=0; MaxEffectiveRunoff=0
        SoilTemperature Temperature
      Plant Soybean
        Cultivar early000
          Command:
             [Phenology].Vegetative.Target.FixedValue = 237
             [Phenology].EarlyFlowering.Target.FixedValue = 268
             [Phenology].EarlyPodDevelopment.Target.FixedValue = 213
             [Phenology].LateGrainFilling.Target.EntireGrainfillPeriod.FixedValue = 125
             [Phenology].Maturing.Target.FixedValue = 133
             [Phenology].Ripening.Target.FixedValue = 129
             [Phenology].VegetativePhotoperiodModifier.XYPairs.X = 14.69, 23.08
             [Phenology].ReproductivePhotoperiodModifier.XYPairs.X = 14.69, 23.08
        Cultivar mid000
          Command:
             [Phenology].Vegetative.Target.FixedValue = 247
             [Phenology].EarlyFlowering.Target.FixedValue = 258
             [Phenology].EarlyPodDevelopment.Target.FixedValue = 205
             [Phenology].LateGrainFilling.Target.EntireGrainfillPeriod.FixedValue = 127
             [Phenology].Maturing.Target.FixedValue = 137
             [Phenology].Ripening.Target.FixedValue = 129
             [Phenology].VegetativePhotoperiodModifier.XYPairs.X = 14.61, 22.57
             [Phenology].ReproductivePhotoperiodModifier.XYPairs.X = 14.61, 22.57
        Cultivar late000
          Command:
             [Phenology].Vegetative.Target.FixedValue = 258
             [Phenology].EarlyFlowering.Target.FixedValue = 246
             [Phenology].EarlyPodDevelopment.Target.FixedValue = 197
             [Phenology].LateGrainFilling.Target.EntireGrainfillPeriod.FixedValue = 131
             [Phenology].Maturing.Target.FixedValue = 143
             [Phenology].Ripening.Target.FixedValue = 129
             [Phenology].VegetativePhotoperiodModifier.XYPairs.X = 14.52, 22.07
             [Phenology].ReproductivePhotoperiodModifier.XYPairs.X = 14.52, 22.07
        Cultivar early00
          Command:
             [Phenology].Vegetative.Target.FixedValue = 270
             [Phenology].EarlyFlowering.Target.FixedValue = 232
             [Phenology].EarlyPodDevelopment.Target.FixedValue = 189
             [Phenology].LateGrainFilling.Target.EntireGrainfillPeriod.FixedValue = 136
             [Phenology].Maturing.Target.FixedValue = 151
             [Phenology].Ripening.Target.FixedValue = 127
             [Phenology].VegetativePhotoperiodModifier.XYPairs.X = 14.44, 21.59
             [Phenology].ReproductivePhotoperiodModifier.XYPairs.X = 14.44, 21.59
        Cultivar mid00
          Command:
             [Phenology].Vegetative.Target.FixedValue = 282
             [Phenology].EarlyFlowering.Target.FixedValue = 214
             [Phenology].EarlyPodDevelopment.Target.FixedValue = 181
             [Phenology].LateGrainFilling.Target.EntireGrainfillPeriod.FixedValue = 142
             [Phenology].Maturing.Target.FixedValue = 162
             [Phenology].Ripening.Target.FixedValue = 124
             [Phenology].VegetativePhotoperiodModifier.XYPairs.X = 14.36, 21.12
             [Phenology].ReproductivePhotoperiodModifier.XYPairs.X = 14.36, 21.12
        Cultivar late00
          Command:
             [Phenology].Vegetative.Target.FixedValue = 295
             [Phenology].EarlyFlowering.Target.FixedValue = 193
             [Phenology].EarlyPodDevelopment.Target.FixedValue = 175
             [Phenology].LateGrainFilling.Target.EntireGrainfillPeriod.FixedValue = 150
             [Phenology].Maturing.Target.FixedValue = 176
             [Phenology].Ripening.Target.FixedValue = 119
             [Phenology].VegetativePhotoperiodModifier.XYPairs.X = 14.27, 20.68
             [Phenology].ReproductivePhotoperiodModifier.XYPairs.X = 14.27, 20.68
        Cultivar early0
          Command:
             [Phenology].Vegetative.Target.FixedValue = 307
             [Phenology].EarlyFlowering.Target.FixedValue = 170
             [Phenology].EarlyPodDevelopment.Target.FixedValue = 171
             [Phenology].LateGrainFilling.Target.EntireGrainfillPeriod.FixedValue = 159
             [Phenology].Maturing.Target.FixedValue = 195
             [Phenology].Ripening.Target.FixedValue = 111
             [Phenology].VegetativePhotoperiodModifier.XYPairs.X = 14.19, 20.25
             [Phenology].ReproductivePhotoperiodModifier.XYPairs.X = 14.19, 20.25
        Cultivar mid0
          Command:
             [Phenology].Vegetative.Target.FixedValue = 313
             [Phenology].EarlyFlowering.Target.FixedValue = 149
             [Phenology].EarlyPodDevelopment.Target.FixedValue = 169
             [Phenology].LateGrainFilling.Target.EntireGrainfillPeriod.FixedValue = 168
             [Phenology].Maturing.Target.FixedValue = 214
             [Phenology].Ripening.Target.FixedValue = 104
             [Phenology].VegetativePhotoperiodModifier.XYPairs.X = 14.1, 19.85
             [Phenology].ReproductivePhotoperiodModifier.XYPairs.X = 14.1, 19.85
        Cultivar late0
          Command:
             [Phenology].Vegetative.Target.FixedValue = 315
             [Phenology].EarlyFlowering.Target.FixedValue = 133
             [Phenology].EarlyPodDevelopment.Target.FixedValue = 171
             [Phenology].LateGrainFilling.Target.EntireGrainfillPeriod.FixedValue = 176
             [Phenology].Maturing.Target.FixedValue = 233
             [Phenology].Ripening.Target.FixedValue = 97
             [Phenology].VegetativePhotoperiodModifier.XYPairs.X = 14.02, 19.46
             [Phenology].ReproductivePhotoperiodModifier.XYPairs.X = 14.02, 19.46
        Cultivar early1
          Command:
             [Phenology].Vegetative.Target.FixedValue = 315
             [Phenology].EarlyFlowering.Target.FixedValue = 122
             [Phenology].EarlyPodDevelopment.Target.FixedValue = 175
             [Phenology].LateGrainFilling.Target.EntireGrainfillPeriod.FixedValue = 184
             [Phenology].Maturing.Target.FixedValue = 250
             [Phenology].Ripening.Target.FixedValue = 88
             [Phenology].VegetativePhotoperiodModifier.XYPairs.X = 13.94, 19.09
             [Phenology].ReproductivePhotoperiodModifier.XYPairs.X = 13.94, 19.09
        Cultivar mid1
          Command:
             [Phenology].Vegetative.Target.FixedValue = 318
             [Phenology].EarlyFlowering.Target.FixedValue = 112
             [Phenology].EarlyPodDevelopment.Target.FixedValue = 182
             [Phenology].LateGrainFilling.Target.EntireGrainfillPeriod.FixedValue = 189
             [Phenology].Maturing.Target.FixedValue = 266
             [Phenology].Ripening.Target.FixedValue = 76
             [Phenology].VegetativePhotoperiodModifier.XYPairs.X = 13.85, 18.74
             [Phenology].ReproductivePhotoperiodModifier.XYPairs.X = 13.85, 18.74
        Cultivar late1
          Command:
             [Phenology].Vegetative.Target.FixedValue = 319
             [Phenology].EarlyFlowering.Target.FixedValue = 109
             [Phenology].EarlyPodDevelopment.Target.FixedValue = 192
             [Phenology].LateGrainFilling.Target.EntireGrainfillPeriod.FixedValue = 193
             [Phenology].Maturing.Target.FixedValue = 273
             [Phenology].Ripening.Target.FixedValue = 66
             [Phenology].VegetativePhotoperiodModifier.XYPairs.X = 13.77, 18.41
             [Phenology].ReproductivePhotoperiodModifier.XYPairs.X = 13.77, 18.41
        Cultivar early2
          Command:
             [Phenology].Vegetative.Target.FixedValue = 318
             [Phenology].EarlyFlowering.Target.FixedValue = 110
             [Phenology].EarlyPodDevelopment.Target.FixedValue = 202
             [Phenology].LateGrainFilling.Target.EntireGrainfillPeriod.FixedValue = 195
             [Phenology].Maturing.Target.FixedValue = 274
             [Phenology].Ripening.Target.FixedValue = 62
             [Phenology].VegetativePhotoperiodModifier.XYPairs.X = 13.68, 18.09
             [Phenology].ReproductivePhotoperiodModifier.XYPairs.X = 13.68, 18.09
        Cultivar mid2
          Command:
             [Phenology].Vegetative.Target.FixedValue = 309
             [Phenology].EarlyFlowering.Target.FixedValue = 118
             [Phenology].EarlyPodDevelopment.Target.FixedValue = 211
             [Phenology].LateGrainFilling.Target.EntireGrainfillPeriod.FixedValue = 196
             [Phenology].Maturing.Target.FixedValue = 266
             [Phenology].Ripening.Target.FixedValue = 70
             [Phenology].VegetativePhotoperiodModifier.XYPairs.X = 13.6, 17.8
             [Phenology].ReproductivePhotoperiodModifier.XYPairs.X = 13.6, 17.8
        Cultivar late2
          Command:
             [Phenology].Vegetative.Target.FixedValue = 291
             [Phenology].EarlyFlowering.Target.FixedValue = 129
             [Phenology].EarlyPodDevelopment.Target.FixedValue = 218
             [Phenology].LateGrainFilling.Target.EntireGrainfillPeriod.FixedValue = 196
             [Phenology].Maturing.Target.FixedValue = 256
             [Phenology].Ripening.Target.FixedValue = 91
             [Phenology].VegetativePhotoperiodModifier.XYPairs.X = 13.51, 17.52
             [Phenology].ReproductivePhotoperiodModifier.XYPairs.X = 13.51, 17.52
        Cultivar early3
          Command:
             [Phenology].Vegetative.Target.FixedValue = 271
             [Phenology].EarlyFlowering.Target.FixedValue = 139
             [Phenology].EarlyPodDevelopment.Target.FixedValue = 222
             [Phenology].LateGrainFilling.Target.EntireGrainfillPeriod.FixedValue = 198
             [Phenology].Maturing.Target.FixedValue = 249
             [Phenology].Ripening.Target.FixedValue = 116
             [Phenology].VegetativePhotoperiodModifier.XYPairs.X = 13.43, 17.26
             [Phenology].ReproductivePhotoperiodModifier.XYPairs.X = 13.43, 17.26
        Cultivar mid3
          Command:
             [Phenology].Vegetative.Target.FixedValue = 255
             [Phenology].EarlyFlowering.Target.FixedValue = 147
             [Phenology].EarlyPodDevelopment.Target.FixedValue = 222
             [Phenology].LateGrainFilling.Target.EntireGrainfillPeriod.FixedValue = 200
             [Phenology].Maturing.Target.FixedValue = 250
             [Phenology].Ripening.Target.FixedValue = 141
             [Phenology].VegetativePhotoperiodModifier.XYPairs.X = 13.35, 17.02
             [Phenology].ReproductivePhotoperiodModifier.XYPairs.X = 13.35, 17.02
        Cultivar late3
          Command:
             [Phenology].Vegetative.Target.FixedValue = 246
             [Phenology].EarlyFlowering.Target.FixedValue = 154
             [Phenology].EarlyPodDevelopment.Target.FixedValue = 220
             [Phenology].LateGrainFilling.Target.EntireGrainfillPeriod.FixedValue = 204
             [Phenology].Maturing.Target.FixedValue = 258
             [Phenology].Ripening.Target.FixedValue = 161
             [Phenology].VegetativePhotoperiodModifier.XYPairs.X = 13.26, 16.8
             [Phenology].ReproductivePhotoperiodModifier.XYPairs.X = 13.26, 16.8
        Cultivar early4
          Command:
             [Phenology].Vegetative.Target.FixedValue = 245
             [Phenology].EarlyFlowering.Target.FixedValue = 166
             [Phenology].EarlyPodDevelopment.Target.FixedValue = 216
             [Phenology].LateGrainFilling.Target.EntireGrainfillPeriod.FixedValue = 208
             [Phenology].Maturing.Target.FixedValue = 268
             [Phenology].Ripening.Target.FixedValue = 178
             [Phenology].VegetativePhotoperiodModifier.XYPairs.X = 13.18, 16.6
             [Phenology].ReproductivePhotoperiodModifier.XYPairs.X = 13.18, 16.6
        Cultivar mid4
          Command:
             [Phenology].Vegetative.Target.FixedValue = 255
             [Phenology].EarlyFlowering.Target.FixedValue = 184
             [Phenology].EarlyPodDevelopment.Target.FixedValue = 210
             [Phenology].LateGrainFilling.Target.EntireGrainfillPeriod.FixedValue = 211
             [Phenology].Maturing.Target.FixedValue = 277
             [Phenology].Ripening.Target.FixedValue = 192
             [Phenology].VegetativePhotoperiodModifier.XYPairs.X = 13.09, 16.42
             [Phenology].ReproductivePhotoperiodModifier.XYPairs.X = 13.09, 16.42
        Cultivar late4
          Command:
             [Phenology].Vegetative.Target.FixedValue = 274
             [Phenology].EarlyFlowering.Target.FixedValue = 204
             [Phenology].EarlyPodDevelopment.Target.FixedValue = 205
             [Phenology].LateGrainFilling.Target.EntireGrainfillPeriod.FixedValue = 214
             [Phenology].Maturing.Target.FixedValue = 284
             [Phenology].Ripening.Target.FixedValue = 201
             [Phenology].VegetativePhotoperiodModifier.XYPairs.X = 13.01, 16.25
             [Phenology].ReproductivePhotoperiodModifier.XYPairs.X = 13.01, 16.25
        Cultivar early5
          Command:
             [Phenology].Vegetative.Target.FixedValue = 298
             [Phenology].EarlyFlowering.Target.FixedValue = 223
             [Phenology].EarlyPodDevelopment.Target.FixedValue = 200
             [Phenology].LateGrainFilling.Target.EntireGrainfillPeriod.FixedValue = 217
             [Phenology].Maturing.Target.FixedValue = 287
             [Phenology].Ripening.Target.FixedValue = 207
             [Phenology].VegetativePhotoperiodModifier.XYPairs.X = 12.93, 16.11
             [Phenology].ReproductivePhotoperiodModifier.XYPairs.X = 12.93, 16.11
        Cultivar mid5
          Command:
             [Phenology].Vegetative.Target.FixedValue = 321
             [Phenology].EarlyFlowering.Target.FixedValue = 235
             [Phenology].EarlyPodDevelopment.Target.FixedValue = 195
             [Phenology].LateGrainFilling.Target.EntireGrainfillPeriod.FixedValue = 218
             [Phenology].Maturing.Target.FixedValue = 288
             [Phenology].Ripening.Target.FixedValue = 210
             [Phenology].VegetativePhotoperiodModifier.XYPairs.X = 12.84, 15.98
             [Phenology].ReproductivePhotoperiodModifier.XYPairs.X = 12.84, 15.98
        Cultivar late5
          Command:
             [Phenology].Vegetative.Target.FixedValue = 337
             [Phenology].EarlyFlowering.Target.FixedValue = 238
             [Phenology].EarlyPodDevelopment.Target.FixedValue = 192
             [Phenology].LateGrainFilling.Target.EntireGrainfillPeriod.FixedValue = 219
             [Phenology].Maturing.Target.FixedValue = 285
             [Phenology].Ripening.Target.FixedValue = 213
             [Phenology].VegetativePhotoperiodModifier.XYPairs.X = 12.76, 15.87
             [Phenology].ReproductivePhotoperiodModifier.XYPairs.X = 12.76, 15.87
        Cultivar early6
          Command:
             [Phenology].Vegetative.Target.FixedValue = 341
             [Phenology].EarlyFlowering.Target.FixedValue = 231
             [Phenology].EarlyPodDevelopment.Target.FixedValue = 190
             [Phenology].LateGrainFilling.Target.EntireGrainfillPeriod.FixedValue = 220
             [Phenology].Maturing.Target.FixedValue = 281
             [Phenology].Ripening.Target.FixedValue = 216
             [Phenology].VegetativePhotoperiodModifier.XYPairs.X = 12.67, 15.78
             [Phenology].ReproductivePhotoperiodModifier.XYPairs.X = 12.67, 15.78
        Cultivar mid6
          Command:
             [Phenology].Vegetative.Target.FixedValue = 333
             [Phenology].EarlyFlowering.Target.FixedValue = 216
             [Phenology].EarlyPodDevelopment.Target.FixedValue = 189
             [Phenology].LateGrainFilling.Target.EntireGrainfillPeriod.FixedValue = 221
             [Phenology].Maturing.Target.FixedValue = 276
             [Phenology].Ripening.Target.FixedValue = 221
             [Phenology].VegetativePhotoperiodModifier.XYPairs.X = 12.59, 15.7
             [Phenology].ReproductivePhotoperiodModifier.XYPairs.X = 12.59, 15.7
        Cultivar late6
          Command:
             [Phenology].Vegetative.Target.FixedValue = 315
             [Phenology].EarlyFlowering.Target.FixedValue = 198
             [Phenology].EarlyPodDevelopment.Target.FixedValue = 189
             [Phenology].LateGrainFilling.Target.EntireGrainfillPeriod.FixedValue = 220
             [Phenology].Maturing.Target.FixedValue = 273
             [Phenology].Ripening.Target.FixedValue = 226
             [Phenology].VegetativePhotoperiodModifier.XYPairs.X = 12.5, 15.65
             [Phenology].ReproductivePhotoperiodModifier.XYPairs.X = 12.5, 15.65
        Cultivar early7
          Command:
             [Phenology].Vegetative.Target.FixedValue = 285
             [Phenology].EarlyFlowering.Target.FixedValue = 184
             [Phenology].EarlyPodDevelopment.Target.FixedValue = 191
             [Phenology].LateGrainFilling.Target.EntireGrainfillPeriod.FixedValue = 219
             [Phenology].Maturing.Target.FixedValue = 268
             [Phenology].Ripening.Target.FixedValue = 230
             [Phenology].VegetativePhotoperiodModifier.XYPairs.X = 12.42, 15.61
             [Phenology].ReproductivePhotoperiodModifier.XYPairs.X = 12.42, 15.61
        Cultivar mid7
          Command:
             [Phenology].Vegetative.Target.FixedValue = 243
             [Phenology].EarlyFlowering.Target.FixedValue = 181
             [Phenology].EarlyPodDevelopment.Target.FixedValue = 196
             [Phenology].LateGrainFilling.Target.EntireGrainfillPeriod.FixedValue = 215
             [Phenology].Maturing.Target.FixedValue = 262
             [Phenology].Ripening.Target.FixedValue = 234
             [Phenology].VegetativePhotoperiodModifier.XYPairs.X = 12.34, 15.6
             [Phenology].ReproductivePhotoperiodModifier.XYPairs.X = 12.34, 15.6
        Cultivar late7
          Command:
             [Phenology].Vegetative.Target.FixedValue = 196
             [Phenology].EarlyFlowering.Target.FixedValue = 188
             [Phenology].EarlyPodDevelopment.Target.FixedValue = 203
             [Phenology].LateGrainFilling.Target.EntireGrainfillPeriod.FixedValue = 211
             [Phenology].Maturing.Target.FixedValue = 254
             [Phenology].Ripening.Target.FixedValue = 236
             [Phenology].VegetativePhotoperiodModifier.XYPairs.X = 12.25, 15.6
             [Phenology].ReproductivePhotoperiodModifier.XYPairs.X = 12.25, 15.6
      SurfaceOrganicMatter: InitialResidueName=soybean; InitialResidueType=soybean; InitialResidueMass=2000; InitialStandingFraction=0.2; InitialCPR=0; InitialCNR=20
      Manager Sowing
        Crop = [Soybean]
        SowDate = NA
        StartDate = 15-march
        EndDate = 31-may
        MinESW = 100
        MinRain = 25
        RainDays = 7
        ForceSow = True
        CultivarName = early0
        SowingDepth = 30
        RowSpacing = 750
        Population = 6
```csharp
using Models.Interfaces;
using APSIM.Shared.Utilities;
using Models.Utilities;
using Models.Soils;
using Models.PMF;
using Models.Core;
using System;
using System.Linq;
using Models.Climate;

namespace Models
{
    [Serializable]
    public class Script : Model
    {
        [Link] private Clock Clock;
        [Link] private Fertiliser Fertiliser;
        [Link] private Summary Summary;
        [Link] private Soil Soil;
        private Accumulator accumulatedRain;
        [Link]
        private ISoilWater waterBalance;

        [Description("Crop")]
        public IPlant Crop { get; set; }

		[Separator("If Sowing Date is specified")]
		[Description("Sowing date (d-mmm)")]
        public string SowDate { get; set; }

		[Separator("If Sowing Date is not specified")]
        [Description("Start of sowing window (d-mmm)")]
        public string StartDate { get; set; }

        [Description("End of sowing window (d-mmm)")]
        public string EndDate { get; set; }

        [Description("Minimum extractable soil water for sowing (mm)")]
        public double MinESW { get; set; }

        [Description("Accumulated rainfall required for sowing (mm)")]
        public double MinRain { get; set; }

        [Description("Duration of rainfall accumulation (d)")]
        public int RainDays { get; set; }
        
        [Description("Force sowing by end of window?")]
        public bool ForceSow { get; set; }

		[Separator("Sowing Parameters")]
        [Display(Type = DisplayType.CultivarName)]
        [Description("Cultivar to be sown")]
        public string CultivarName { get; set; }

        [Description("Sowing depth (mm)")]
        public double SowingDepth { get; set; }

        [Description("Row spacing (mm)")]
        public double RowSpacing { get; set; }

        [Description("Plant population (/m2)")]
        public double Population { get; set; }

        
        public string SimSowDate { get; set; }
        public bool SeasonOpen { get; set; }
        
        [EventSubscribe("StartOfSimulation")]
        private void OnSimulationCommencing(object sender, EventArgs e)
        {
            accumulatedRain = new Accumulator(this, "[Weather].Rain", RainDays);
            SeasonOpen = true;
        }

        [EventSubscribe("DoManagement")]
        private void OnDoManagement(object sender, EventArgs e)
        {
            accumulatedRain.Update();
            SimSowDate = "NA";
            bool SowNow = false;
            
            if (SeasonOpen) { // Only allow one attempt at sowing.
                if (SowDate != "NA") {
		            if (DateUtilities.WithinDates(SowDate, Clock.Today, SowDate)) // Sow at date specified.
		            {
		               SowNow = true;
		            }
                } else { 
                    if (DateUtilities.WithinDates(StartDate, Clock.Today, EndDate) && // If no date specified, sow when parameters met. 
		                    !Crop.IsAlive &&
		                    MathUtilities.Sum(waterBalance.ESW) > MinESW &&
		                    accumulatedRain.Sum > MinRain)
		                {
		                    SowNow = true;
		                } 
		            if (ForceSow && // If it's the end of the sowing window and we haven't sown yet, sow. 
		                    !Crop.IsAlive &&
		                    DateUtilities.DatesEqual(EndDate, Clock.Today)) 
		                {
		                    SowNow = true;
		                }
		         }
		     }
		     
		     if (SowNow) {
		        Crop.Sow(population: Population, cultivar: CultivarName, depth: SowingDepth, rowSpacing: RowSpacing);    
		         	   SimSowDate = Clock.Today.ToString("yyyy-MM-dd");
		         	   SeasonOpen = false;
		     }
		     
        }
    }
}
```
      Manager Fertilise at sowing
        Crop = [Soybean]
        FertiliserType = UreaN
        Amount = 220
```csharp
using Models.Soils;
using System;
using System.Linq;
using Models.Core;
using Models.PMF;
namespace Models
{
    [Serializable]
    public class Script : Model
    {
        [Link] Clock Clock;
        [Link] Fertiliser Fertiliser;
        
        [Description("Crop to be fertilised")]
        public IPlant Crop { get; set; }

        [Description("Type of fertiliser to apply? ")] 
        [Display(Type = DisplayType.FertiliserType)]public string FertiliserType { get; set; }
    
        [Description("Amount of fertiliser to be applied (kg/ha)")]
        public double Amount { get; set; }
        
        [EventSubscribe("Sowing")]
        private void OnSowing(object sender, EventArgs e)
        {
            Model crop = sender as Model;
            if (Crop != null && crop.Name.ToLower() == (Crop as IModel).Name.ToLower())
                Fertiliser.Apply(amount: Amount, type: FertiliserType);
        }
    }
}
```
      Manager Tillage on a fixed date
        TillageDate = 20-mar
        Fraction = 0.4
        Depth = 150
```csharp
using Models.Soils;
using System;
using System.Linq;
using Models.Core;
using Models.PMF;
using APSIM.Shared.Utilities;
using Models.Surface;

namespace Models
{
    [Serializable]
    public class Script : Model
    {
        [Link] Clock Clock;
        [Link] SurfaceOrganicMatter SOM;
        
        [Description("Tillage Date")]
        public string TillageDate { get; set; }
        
        [Description("Fraction of Residues To Incorporate (0-1)")]
        public double Fraction { get; set; }

        [Description("Depth of Tillage (mm)")]
        public double Depth { get; set; }

        [EventSubscribe("DoManagement")]
        private void OnDoManagement(object sender, EventArgs e)
        {
            if (DateUtilities.WithinDates(TillageDate, Clock.Today, TillageDate))
                SOM.Incorporate(Fraction, Depth);
        }
    }
}
```
      Manager ReaperMan
        GermWait = 30
        EmergWait = 30
        MaxStall = 14
        LethalFrost = -2.5
```csharp
using APSIM.Shared.Utilities;
using Models.Utilities;
using Models.Soils;
using Models.PMF;
using Models.Core;
using System;
using System.Linq;
using Models.Functions;
using System.Diagnostics;
using Models.Climate;

namespace Models
{
    [Serializable] 
    public class Script : Model
    {
		[Link] Clock Clock;
        [Link] Zone Zone;
        [Link] Weather Weather;
        [Link] Summary Summary;
        [Link] IEvent Events = null;
        [Link] IPlant Crop;
        
        [Separator("Triggers to kill the crop")]

        [Description("Number of days to wait before killing ungerminated plants")] 
        public int GermWait { get; set; }  
        
        [Description("Number of days to wait before killing unemerged plants")] 
        public int EmergWait { get; set; }  
        
        [Description("Number of days to wait before killing stalled plants")] 
        public int MaxStall { get; set; }  
        public double PrevStage {get; set;}
        public int StalledFor {get; set;}  
        
        [Description("Kill if maximum daily tempterature is below (C)")]  
        public double LethalFrost { get; set; }
        
        private DateTime GerminationDeadline; 
        private DateTime EmergenceDeadline; 
         
        public string SimMatDate {get; set;} 
        public bool WasSown {get; set;}
        public bool MatDateRecorded {get; set;} 
        public string SimHarvestDate {get; set;} 
        public string Result {get; set;}   
        
        [EventSubscribe("StartOfSimulation")]
        private void OnStartOfSimulation(object sender, EventArgs e)
        {
            double PrevStage = 0;
            double StalledFor = 0;
            bool WasSown = false;
        }
        
        [EventSubscribe("Sowing")]
        private void OnSowing(object sender, EventArgs e)
        {
            GerminationDeadline = Clock.Today.AddDays(GermWait);
            EmergenceDeadline = Clock.Today.AddDays(EmergWait);
            WasSown = true;
            MatDateRecorded = false;
            
        }
        
        [EventSubscribe("DoManagement")]
        private void OnDoManagement(object sender, EventArgs e)
        {
  			bool End = false;
  			double Stage = (double)Crop.FindByPath("Phenology.Stage").Value; 
  			Result = "NA";
  			
  			if (Stage >= 10 && MatDateRecorded == false) {
	            SimMatDate = Clock.Today.ToString("yyyy-MM-dd");
	            MatDateRecorded = true;
	        } else {
	        	SimMatDate = "NA";
	        }
  			
            if (Crop.IsReadyForHarvesting)
            {
            	Summary.WriteMessage(this, "Result: Harvested at Maturity.", MessageType.Diagnostic);
                End = true;
                Result = "Harvested at Maturity.";
            } 
            else if (Crop.IsAlive) 
            {
	        	double LAI = (double)Crop.FindByPath("Leaf.LAI").Value; 
	        	        	
		        if (Stage == PrevStage) {
		        	StalledFor += 1;
		        	if (StalledFor >= MaxStall)
		        	{
			        	Summary.WriteMessage(this, "Result: Stalled, killed.", MessageType.Diagnostic);
			        	StalledFor = 0;
			        	PrevStage = 0;
						End = true;
						Result = "Stalled, killed.";
		        	}
		        } 
		        else 
		        {
		       		StalledFor = 0;
		        }
				PrevStage = Stage;

	        	if (Clock.Today == GerminationDeadline && Stage < 2)
	               {
	               Summary.WriteMessage(this, "Result: Failed to Germinate.", MessageType.Diagnostic);
	               End = true;
	               Result = "Failed to Germinate.";
		        }
	            else if (Clock.Today == EmergenceDeadline && Stage < 3)
	               {
	               Summary.WriteMessage(this, "Result: Failed to Emerge.", MessageType.Diagnostic);
				   End = true;
				   Result = "Failed to Emerge.";
		        }
		        else if (Weather.MaxT <= LethalFrost && Stage < 9)
	               {
	               Summary.WriteMessage(this, "Result: Dead from Frost.", MessageType.Diagnostic);
				   End = true;
				   Result = "Dead from Frost.";
		        }
		        else if (LAI <= 0.001 && Stage > 4 && Stage < 9.9)
	               {
	               Summary.WriteMessage(this, "Result: Dead from Total Senescence (0 LAI between Flowering and Maturation).", MessageType.Diagnostic);
				   End = true;
				   Result = "Dead from Total Senescence.";
		        }
	        }
	        
	        if (Clock.Today == Clock.EndDate) {
	            if (!WasSown) { 
                    Summary.WriteMessage(this, "Result: Unable to Meet Sowing Conditions.", MessageType.Diagnostic);
                    Result = "Unable to Meet Sowing Conditions.";
                }
	        }
	        
	        if (End == true) {
				Crop.Harvest();
		        Crop.EndCrop();
	            SimHarvestDate = Clock.Today.ToString("yyyy-MM-dd");
	        } else {
	        	SimHarvestDate = "NA";
	        }
      	}
    }
}
```
      Report: EventNames=[Clock].DoReport
        VariableNames:
          [Clock].Today as Date
          [Clock].Today.Year as Year
          [Clock].Today.DayOfYear as DOY
          [Phenology].CurrentPhaseName as StageName
          [Phenology].Stage as Stage
          [Sowing].Script.SimSowDate as SimSowDate
          [ReaperMan].Script.SimMatDate as SimMatDate
          [ReaperMan].Script.SimHarvestDate as SimHarvestDate
          [Weather].Rain as Rain
          [Weather].Radn as Radn
          [Weather].MaxT as MaxT
          [Weather].MeanT as MeanT
          [Weather].MinT as MinT
          [Phenology].ThermalTime as ThermalTime
          [Phenology].AccumulatedEmergedTT as AccEmTT
          [Soil].Temperature.Value[2] as SoilTemp
          sum([Soil].Water.PAWmm) as PAWmm
          sum([Soil].NH4.kgha) as NH4
          sum([Soil].NO3.kgha) as NO3
          sum([Soil].Urea.kgha) as Urea
          sum([Nutrient].Organic.C) as OrganicC
          [Leaf].FRGR as FracGrowthRate
          [Photosynthesis].FN as NutrientStress
          [Photosynthesis].FT as TempStress
          [Photosynthesis].FW as WaterStress
          [ReaperMan].Script.Result as Result
  DataStore
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