Simulations: Version=192
  Simulation
    Clock: Start=2018-04-25; End=2019-03-25
    Summary
    Weather: Latitude=40.764; Tav=10.5701; Amp=29.1048
      FileName=C:/Users/cmg3/Documents/GitHub/SCT/output_files/met/loc_20.met
    SoilArbitrator
    MicroClimate: a_interception=0; b_interception=1; c_interception=0; d_interception=0; SoilHeatFluxFraction=0; MinimumHeightDiffForNewLayer=0; NightInterceptionFraction=0; ReferenceHeight=2
    Zone Field: Area=1; Slope=0; AspectAngle=0; Altitude=50
      Fertiliser
      Soil Sebewa:160684: SoilType=Sebewa:160684; State=IN; Country=USA; ApsoilNumber=0; Latitude=41.4444; Longitude=-86.9437
        DataSource=SSURGO (https://sdmdataaccess.nrcs.usda.gov/) through R package soilDB, R package apsimx function ssurgo2sp. Timestamp 2025-05-15 23:32:37.944103
        Comments=cokey = 25183709 - acres percent = 100 - component percent = 100 - taxonomic classification name = Fine-loamy over sandy or sandy-skeletal, mixed, superactive, mesic Typic Argiaquolls - drainage class = Very poorly drained - elevation = 220.4 - slope = 1 - geomdesc = NA
        Physical
          Thickness  ParticleSizeSand  ParticleSizeSilt  ParticleSizeClay  BD       AirDry      LL15        DUL        SAT       KS
          200        47                30                23                1.39534  0.0799693   0.159939    0.290193   0.472455  792.288
          200        47                30                23                1.39534  0.0799693   0.159939    0.290193   0.472455  792.288
          200        47                30                23                1.39534  0.0799693   0.159939    0.290193   0.472455  792.288
          200        45                28                27                1.5168   0.16909978  0.16909978  0.290549   0.426623  792.288
          200        45                28                27                1.5168   0.16909978  0.16909978  0.290549   0.426623  792.288
          200        45                28                27                1.5168   0.16909978  0.16909978  0.290549   0.426623  792.288
          200        87                9                 4                 1.55409  0.0192432   0.0192432   0.0675229  0.412551  7926.336
          200        87                9                 4                 1.55409  0.0192432   0.0192432   0.0675229  0.412551  7926.336
          200        87                9                 4                 1.55409  0.0192432   0.0192432   0.0675229  0.412551  7926.336
          200        87                9                 4                 1.55409  0.0192432   0.0192432   0.0675229  0.412551  7926.336
          SoilCrop MaizeSoil
            LL=[0.159939, 0.159939, 0.159939, 0.16909978, 0.16909978, 0.16909978, 0.0192432, 0.0192432, 0.0192432, 0.0192432]
            KL=[0.06, 0.0491238, 0.0402192, 0.0329287, 0.0269597, 0.0220728, 0.0180717, 0.0147958, 0.0121138, 0.00991793]
            XF=[1, 1, 1, 1, 1, 1, 1, 1, 1, 1]
          SoilCrop SoybeanSoil: same as Simulation.Field.Sebewa:160684.Physical.MaizeSoil
          SoilCrop WheatSoil: same as Simulation.Field.Sebewa:160684.Physical.MaizeSoil
        WaterBalance SoilWater: SummerDate=1-Jun; SummerU=9.05; SummerCona=4; WinterDate=1-Nov; WinterU=9.05; WinterCona=4; DiffusConst=40; DiffusSlope=16; Salb=0.15; CN2Bare=78; CNRed=20; CNCov=0.8; PSIDul=-100; Thickness=[200, 200, 200, 200, 200, 200, 200, 200, 200, 200]
          SWCON=[0.387073, 0.387073, 0.387073, 0.320548, 0.320548, 0.320548, 0.836724, 0.836724, 0.836724, 0.836724]
        Organic: FOMCNRatio=40; CarbonUnits=Total
          Thickness  Carbon    SoilCNRatio  FBiom       FInert    FOM
          200        2.03488   12           0.04        0.8       150
          200        2.03488   12           0.0327492   0.80804   122.81
          200        2.03488   12           0.0268128   0.816161  100.548
          200        0.726744  12           0.0219525   0.824364  82.3217
          200        0.726744  12           0.0179732   0.832649  67.3993
          200        0.726744  12           0.0147152   0.841017  55.1819
          200        0.145349  12           0.0120478   0.849469  45.1791
          200        0.145349  12           0.00986388  0.858007  36.9895
          200        0.145349  12           0.00807586  0.86663   30.2845
          200        0.145349  12           0.00661196  0.875339  24.7948
        Chemical: Thickness=[200, 200, 200, 200, 200, 200, 200, 200, 200, 200]; PH=[6.5, 6.5, 6.5, 6.5, 6.5, 6.5, 6.5, 6.5, 6.5, 6.5]; PHUnits=Water
        Water: Thickness=[200, 200, 200, 200, 200, 200, 200, 200, 200, 200]; InitialPAWmm=361.05; RelativeTo=LL15; FilledFromTop=false
          InitialValues=[0.290193, 0.290193, 0.290193, 0.290549, 0.290549, 0.290549, 0.0675229, 0.0675229, 0.0675229, 0.0675229]
        Nutrient
        Solute NO3: Thickness=[200, 200, 200, 200, 200, 200, 200, 200, 200, 200]; InitialValuesUnits=ppm; WaterTableConcentration=0; D0=0; DepthConstant=0; MaxDepthSoluteAccessible=0; RunoffEffectivenessAtMovingSolute=0; MaxEffectiveRunoff=0
          InitialValues=[0.5, 0.495025, 0.490099, 0.485223, 0.480395, 0.475615, 0.470882, 0.466197, 0.461558, 0.456966]
        Solute NH4: Thickness=[200, 200, 200, 200, 200, 200, 200, 200, 200, 200]; InitialValuesUnits=ppm; WaterTableConcentration=0; D0=0; DepthConstant=0; MaxDepthSoluteAccessible=0; RunoffEffectivenessAtMovingSolute=0; MaxEffectiveRunoff=0
          InitialValues=[0.05, 0.0495025, 0.0490099, 0.0485223, 0.0480395, 0.0475615, 0.0470882, 0.0466197, 0.0461558, 0.0456966]
        Solute Urea: Thickness=[150, 150, 300, 300, 300, 300, 300]; InitialValues=[0, 0, 0, 0, 0, 0, 0]; InitialValuesUnits=kg/ha; WaterTableConcentration=0; D0=0; DepthConstant=0; MaxDepthSoluteAccessible=0; RunoffEffectivenessAtMovingSolute=0; MaxEffectiveRunoff=0
        SoilTemperature Temperature
      Plant Soybean
        Cultivar early000
          Command:
            [Phenology].Vegetative.Target.FixedValue = 108
            [Phenology].EarlyFlowering.Target.FixedValue = 280
            [Phenology].EarlyPodDevelopment.Target.FixedValue = 217
            [Phenology].LateGrainFilling.Target.EntireGrainfillPeriod.FixedValue = 107
            [Phenology].Maturing.Target.FixedValue = 91
            [Phenology].Ripening.Target.FixedValue = 90
            [Phenology].VegetativePhotoperiodModifier.XYPairs.X = 14.69, 23.08
            [Phenology].ReproductivePhotoperiodModifier.XYPairs.X = 14.69, 23.08
        Cultivar mid000
          Command:
            [Phenology].Vegetative.Target.FixedValue = 133
            [Phenology].EarlyFlowering.Target.FixedValue = 271
            [Phenology].EarlyPodDevelopment.Target.FixedValue = 214
            [Phenology].LateGrainFilling.Target.EntireGrainfillPeriod.FixedValue = 109
            [Phenology].Maturing.Target.FixedValue = 88
            [Phenology].Ripening.Target.FixedValue = 88
            [Phenology].VegetativePhotoperiodModifier.XYPairs.X = 14.61, 22.57
            [Phenology].ReproductivePhotoperiodModifier.XYPairs.X = 14.61, 22.57
        Cultivar late000
          Command:
            [Phenology].Vegetative.Target.FixedValue = 159
            [Phenology].EarlyFlowering.Target.FixedValue = 258
            [Phenology].EarlyPodDevelopment.Target.FixedValue = 212
            [Phenology].LateGrainFilling.Target.EntireGrainfillPeriod.FixedValue = 113
            [Phenology].Maturing.Target.FixedValue = 85
            [Phenology].Ripening.Target.FixedValue = 86
            [Phenology].VegetativePhotoperiodModifier.XYPairs.X = 14.52, 22.07
            [Phenology].ReproductivePhotoperiodModifier.XYPairs.X = 14.52, 22.07
        Cultivar early00
          Command:
            [Phenology].Vegetative.Target.FixedValue = 187
            [Phenology].EarlyFlowering.Target.FixedValue = 242
            [Phenology].EarlyPodDevelopment.Target.FixedValue = 211
            [Phenology].LateGrainFilling.Target.EntireGrainfillPeriod.FixedValue = 118
            [Phenology].Maturing.Target.FixedValue = 82
            [Phenology].Ripening.Target.FixedValue = 84
            [Phenology].VegetativePhotoperiodModifier.XYPairs.X = 14.44, 21.59
            [Phenology].ReproductivePhotoperiodModifier.XYPairs.X = 14.44, 21.59
        Cultivar mid00
          Command:
            [Phenology].Vegetative.Target.FixedValue = 215
            [Phenology].EarlyFlowering.Target.FixedValue = 222
            [Phenology].EarlyPodDevelopment.Target.FixedValue = 212
            [Phenology].LateGrainFilling.Target.EntireGrainfillPeriod.FixedValue = 125
            [Phenology].Maturing.Target.FixedValue = 78
            [Phenology].Ripening.Target.FixedValue = 84
            [Phenology].VegetativePhotoperiodModifier.XYPairs.X = 14.36, 21.12
            [Phenology].ReproductivePhotoperiodModifier.XYPairs.X = 14.36, 21.12
        Cultivar late00
          Command:
            [Phenology].Vegetative.Target.FixedValue = 243
            [Phenology].EarlyFlowering.Target.FixedValue = 202
            [Phenology].EarlyPodDevelopment.Target.FixedValue = 213
            [Phenology].LateGrainFilling.Target.EntireGrainfillPeriod.FixedValue = 134
            [Phenology].Maturing.Target.FixedValue = 77
            [Phenology].Ripening.Target.FixedValue = 85
            [Phenology].VegetativePhotoperiodModifier.XYPairs.X = 14.27, 20.68
            [Phenology].ReproductivePhotoperiodModifier.XYPairs.X = 14.27, 20.68
        Cultivar early0
          Command:
            [Phenology].Vegetative.Target.FixedValue = 267
            [Phenology].EarlyFlowering.Target.FixedValue = 183
            [Phenology].EarlyPodDevelopment.Target.FixedValue = 213
            [Phenology].LateGrainFilling.Target.EntireGrainfillPeriod.FixedValue = 142
            [Phenology].Maturing.Target.FixedValue = 78
            [Phenology].Ripening.Target.FixedValue = 88
            [Phenology].VegetativePhotoperiodModifier.XYPairs.X = 14.19, 20.25
            [Phenology].ReproductivePhotoperiodModifier.XYPairs.X = 14.19, 20.25
        Cultivar mid0
          Command:
            [Phenology].Vegetative.Target.FixedValue = 284
            [Phenology].EarlyFlowering.Target.FixedValue = 173
            [Phenology].EarlyPodDevelopment.Target.FixedValue = 211
            [Phenology].LateGrainFilling.Target.EntireGrainfillPeriod.FixedValue = 150
            [Phenology].Maturing.Target.FixedValue = 87
            [Phenology].Ripening.Target.FixedValue = 91
            [Phenology].VegetativePhotoperiodModifier.XYPairs.X = 14.1, 19.85
            [Phenology].ReproductivePhotoperiodModifier.XYPairs.X = 14.1, 19.85
        Cultivar late0
          Command:
            [Phenology].Vegetative.Target.FixedValue = 291
            [Phenology].EarlyFlowering.Target.FixedValue = 175
            [Phenology].EarlyPodDevelopment.Target.FixedValue = 206
            [Phenology].LateGrainFilling.Target.EntireGrainfillPeriod.FixedValue = 155
            [Phenology].Maturing.Target.FixedValue = 102
            [Phenology].Ripening.Target.FixedValue = 93
            [Phenology].VegetativePhotoperiodModifier.XYPairs.X = 14.02, 19.46
            [Phenology].ReproductivePhotoperiodModifier.XYPairs.X = 14.02, 19.46
        Cultivar early1
          Command:
            [Phenology].Vegetative.Target.FixedValue = 288
            [Phenology].EarlyFlowering.Target.FixedValue = 190
            [Phenology].EarlyPodDevelopment.Target.FixedValue = 197
            [Phenology].LateGrainFilling.Target.EntireGrainfillPeriod.FixedValue = 158
            [Phenology].Maturing.Target.FixedValue = 123
            [Phenology].Ripening.Target.FixedValue = 92
            [Phenology].VegetativePhotoperiodModifier.XYPairs.X = 13.94, 19.09
            [Phenology].ReproductivePhotoperiodModifier.XYPairs.X = 13.94, 19.09
        Cultivar mid1
          Command:
            [Phenology].Vegetative.Target.FixedValue = 278
            [Phenology].EarlyFlowering.Target.FixedValue = 212
            [Phenology].EarlyPodDevelopment.Target.FixedValue = 189
            [Phenology].LateGrainFilling.Target.EntireGrainfillPeriod.FixedValue = 160
            [Phenology].Maturing.Target.FixedValue = 143
            [Phenology].Ripening.Target.FixedValue = 89
            [Phenology].VegetativePhotoperiodModifier.XYPairs.X = 13.85, 18.74
            [Phenology].ReproductivePhotoperiodModifier.XYPairs.X = 13.85, 18.74
        Cultivar late1
          Command:
            [Phenology].Vegetative.Target.FixedValue = 264
            [Phenology].EarlyFlowering.Target.FixedValue = 233
            [Phenology].EarlyPodDevelopment.Target.FixedValue = 181
            [Phenology].LateGrainFilling.Target.EntireGrainfillPeriod.FixedValue = 164
            [Phenology].Maturing.Target.FixedValue = 162
            [Phenology].Ripening.Target.FixedValue = 84
            [Phenology].VegetativePhotoperiodModifier.XYPairs.X = 13.77, 18.41
            [Phenology].ReproductivePhotoperiodModifier.XYPairs.X = 13.77, 18.41
        Cultivar early2
          Command:
            [Phenology].Vegetative.Target.FixedValue = 250
            [Phenology].EarlyFlowering.Target.FixedValue = 245
            [Phenology].EarlyPodDevelopment.Target.FixedValue = 176
            [Phenology].LateGrainFilling.Target.EntireGrainfillPeriod.FixedValue = 171
            [Phenology].Maturing.Target.FixedValue = 176
            [Phenology].Ripening.Target.FixedValue = 79
            [Phenology].VegetativePhotoperiodModifier.XYPairs.X = 13.68, 18.09
            [Phenology].ReproductivePhotoperiodModifier.XYPairs.X = 13.68, 18.09
        Cultivar mid2
          Command:
            [Phenology].Vegetative.Target.FixedValue = 240
            [Phenology].EarlyFlowering.Target.FixedValue = 244
            [Phenology].EarlyPodDevelopment.Target.FixedValue = 175
            [Phenology].LateGrainFilling.Target.EntireGrainfillPeriod.FixedValue = 184
            [Phenology].Maturing.Target.FixedValue = 188
            [Phenology].Ripening.Target.FixedValue = 74
            [Phenology].VegetativePhotoperiodModifier.XYPairs.X = 13.6, 17.8
            [Phenology].ReproductivePhotoperiodModifier.XYPairs.X = 13.6, 17.8
        Cultivar late2
          Command:
            [Phenology].Vegetative.Target.FixedValue = 237
            [Phenology].EarlyFlowering.Target.FixedValue = 232
            [Phenology].EarlyPodDevelopment.Target.FixedValue = 179
            [Phenology].LateGrainFilling.Target.EntireGrainfillPeriod.FixedValue = 202
            [Phenology].Maturing.Target.FixedValue = 199
            [Phenology].Ripening.Target.FixedValue = 69
            [Phenology].VegetativePhotoperiodModifier.XYPairs.X = 13.51, 17.52
            [Phenology].ReproductivePhotoperiodModifier.XYPairs.X = 13.51, 17.52
        Cultivar early3
          Command:
            [Phenology].Vegetative.Target.FixedValue = 241
            [Phenology].EarlyFlowering.Target.FixedValue = 214
            [Phenology].EarlyPodDevelopment.Target.FixedValue = 187
            [Phenology].LateGrainFilling.Target.EntireGrainfillPeriod.FixedValue = 225
            [Phenology].Maturing.Target.FixedValue = 210
            [Phenology].Ripening.Target.FixedValue = 62
            [Phenology].VegetativePhotoperiodModifier.XYPairs.X = 13.43, 17.26
            [Phenology].ReproductivePhotoperiodModifier.XYPairs.X = 13.43, 17.26
        Cultivar mid3
          Command:
            [Phenology].Vegetative.Target.FixedValue = 250
            [Phenology].EarlyFlowering.Target.FixedValue = 200
            [Phenology].EarlyPodDevelopment.Target.FixedValue = 201
            [Phenology].LateGrainFilling.Target.EntireGrainfillPeriod.FixedValue = 247
            [Phenology].Maturing.Target.FixedValue = 222
            [Phenology].Ripening.Target.FixedValue = 54
            [Phenology].VegetativePhotoperiodModifier.XYPairs.X = 13.35, 17.02
            [Phenology].ReproductivePhotoperiodModifier.XYPairs.X = 13.35, 17.02
        Cultivar late3
          Command:
            [Phenology].Vegetative.Target.FixedValue = 260
            [Phenology].EarlyFlowering.Target.FixedValue = 197
            [Phenology].EarlyPodDevelopment.Target.FixedValue = 218
            [Phenology].LateGrainFilling.Target.EntireGrainfillPeriod.FixedValue = 264
            [Phenology].Maturing.Target.FixedValue = 234
            [Phenology].Ripening.Target.FixedValue = 47
            [Phenology].VegetativePhotoperiodModifier.XYPairs.X = 13.26, 16.8
            [Phenology].ReproductivePhotoperiodModifier.XYPairs.X = 13.26, 16.8
        Cultivar early4
          Command:
            [Phenology].Vegetative.Target.FixedValue = 266
            [Phenology].EarlyFlowering.Target.FixedValue = 211
            [Phenology].EarlyPodDevelopment.Target.FixedValue = 237
            [Phenology].LateGrainFilling.Target.EntireGrainfillPeriod.FixedValue = 271
            [Phenology].Maturing.Target.FixedValue = 242
            [Phenology].Ripening.Target.FixedValue = 41
            [Phenology].VegetativePhotoperiodModifier.XYPairs.X = 13.18, 16.6
            [Phenology].ReproductivePhotoperiodModifier.XYPairs.X = 13.18, 16.6
        Cultivar mid4
          Command:
            [Phenology].Vegetative.Target.FixedValue = 267
            [Phenology].EarlyFlowering.Target.FixedValue = 240
            [Phenology].EarlyPodDevelopment.Target.FixedValue = 254
            [Phenology].LateGrainFilling.Target.EntireGrainfillPeriod.FixedValue = 266
            [Phenology].Maturing.Target.FixedValue = 244
            [Phenology].Ripening.Target.FixedValue = 41
            [Phenology].VegetativePhotoperiodModifier.XYPairs.X = 13.09, 16.42
            [Phenology].ReproductivePhotoperiodModifier.XYPairs.X = 13.09, 16.42
        Cultivar late4
          Command:
            [Phenology].Vegetative.Target.FixedValue = 261
            [Phenology].EarlyFlowering.Target.FixedValue = 277
            [Phenology].EarlyPodDevelopment.Target.FixedValue = 265
            [Phenology].LateGrainFilling.Target.EntireGrainfillPeriod.FixedValue = 250
            [Phenology].Maturing.Target.FixedValue = 238
            [Phenology].Ripening.Target.FixedValue = 48
            [Phenology].VegetativePhotoperiodModifier.XYPairs.X = 13.01, 16.25
            [Phenology].ReproductivePhotoperiodModifier.XYPairs.X = 13.01, 16.25
        Cultivar early5
          Command:
            [Phenology].Vegetative.Target.FixedValue = 251
            [Phenology].EarlyFlowering.Target.FixedValue = 317
            [Phenology].EarlyPodDevelopment.Target.FixedValue = 270
            [Phenology].LateGrainFilling.Target.EntireGrainfillPeriod.FixedValue = 228
            [Phenology].Maturing.Target.FixedValue = 223
            [Phenology].Ripening.Target.FixedValue = 60
            [Phenology].VegetativePhotoperiodModifier.XYPairs.X = 12.93, 16.11
            [Phenology].ReproductivePhotoperiodModifier.XYPairs.X = 12.93, 16.11
        Cultivar mid5
          Command:
            [Phenology].Vegetative.Target.FixedValue = 239
            [Phenology].EarlyFlowering.Target.FixedValue = 351
            [Phenology].EarlyPodDevelopment.Target.FixedValue = 269
            [Phenology].LateGrainFilling.Target.EntireGrainfillPeriod.FixedValue = 203
            [Phenology].Maturing.Target.FixedValue = 204
            [Phenology].Ripening.Target.FixedValue = 72
            [Phenology].VegetativePhotoperiodModifier.XYPairs.X = 12.84, 15.98
            [Phenology].ReproductivePhotoperiodModifier.XYPairs.X = 12.84, 15.98
        Cultivar late5
          Command:
            [Phenology].Vegetative.Target.FixedValue = 227
            [Phenology].EarlyFlowering.Target.FixedValue = 376
            [Phenology].EarlyPodDevelopment.Target.FixedValue = 267
            [Phenology].LateGrainFilling.Target.EntireGrainfillPeriod.FixedValue = 181
            [Phenology].Maturing.Target.FixedValue = 185
            [Phenology].Ripening.Target.FixedValue = 81
            [Phenology].VegetativePhotoperiodModifier.XYPairs.X = 12.76, 15.87
            [Phenology].ReproductivePhotoperiodModifier.XYPairs.X = 12.76, 15.87
        Cultivar early6
          Command:
            [Phenology].Vegetative.Target.FixedValue = 216
            [Phenology].EarlyFlowering.Target.FixedValue = 391
            [Phenology].EarlyPodDevelopment.Target.FixedValue = 265
            [Phenology].LateGrainFilling.Target.EntireGrainfillPeriod.FixedValue = 162
            [Phenology].Maturing.Target.FixedValue = 166
            [Phenology].Ripening.Target.FixedValue = 88
            [Phenology].VegetativePhotoperiodModifier.XYPairs.X = 12.67, 15.78
            [Phenology].ReproductivePhotoperiodModifier.XYPairs.X = 12.67, 15.78
        Cultivar mid6
          Command:
            [Phenology].Vegetative.Target.FixedValue = 205
            [Phenology].EarlyFlowering.Target.FixedValue = 398
            [Phenology].EarlyPodDevelopment.Target.FixedValue = 263
            [Phenology].LateGrainFilling.Target.EntireGrainfillPeriod.FixedValue = 148
            [Phenology].Maturing.Target.FixedValue = 151
            [Phenology].Ripening.Target.FixedValue = 92
            [Phenology].VegetativePhotoperiodModifier.XYPairs.X = 12.59, 15.7
            [Phenology].ReproductivePhotoperiodModifier.XYPairs.X = 12.59, 15.7
        Cultivar late6
          Command:
            [Phenology].Vegetative.Target.FixedValue = 195
            [Phenology].EarlyFlowering.Target.FixedValue = 399
            [Phenology].EarlyPodDevelopment.Target.FixedValue = 263
            [Phenology].LateGrainFilling.Target.EntireGrainfillPeriod.FixedValue = 137
            [Phenology].Maturing.Target.FixedValue = 139
            [Phenology].Ripening.Target.FixedValue = 95
            [Phenology].VegetativePhotoperiodModifier.XYPairs.X = 12.5, 15.65
            [Phenology].ReproductivePhotoperiodModifier.XYPairs.X = 12.5, 15.65
        Cultivar early7
          Command:
            [Phenology].Vegetative.Target.FixedValue = 184
            [Phenology].EarlyFlowering.Target.FixedValue = 397
            [Phenology].EarlyPodDevelopment.Target.FixedValue = 264
            [Phenology].LateGrainFilling.Target.EntireGrainfillPeriod.FixedValue = 130
            [Phenology].Maturing.Target.FixedValue = 130
            [Phenology].Ripening.Target.FixedValue = 99
            [Phenology].VegetativePhotoperiodModifier.XYPairs.X = 12.42, 15.61
            [Phenology].ReproductivePhotoperiodModifier.XYPairs.X = 12.42, 15.61
        Cultivar mid7
          Command:
            [Phenology].Vegetative.Target.FixedValue = 174
            [Phenology].EarlyFlowering.Target.FixedValue = 392
            [Phenology].EarlyPodDevelopment.Target.FixedValue = 267
            [Phenology].LateGrainFilling.Target.EntireGrainfillPeriod.FixedValue = 125
            [Phenology].Maturing.Target.FixedValue = 123
            [Phenology].Ripening.Target.FixedValue = 103
            [Phenology].VegetativePhotoperiodModifier.XYPairs.X = 12.34, 15.6
            [Phenology].ReproductivePhotoperiodModifier.XYPairs.X = 12.34, 15.6
        Cultivar late7
          Command:
            [Phenology].Vegetative.Target.FixedValue = 163
            [Phenology].EarlyFlowering.Target.FixedValue = 387
            [Phenology].EarlyPodDevelopment.Target.FixedValue = 271
            [Phenology].LateGrainFilling.Target.EntireGrainfillPeriod.FixedValue = 122
            [Phenology].Maturing.Target.FixedValue = 119
            [Phenology].Ripening.Target.FixedValue = 106
            [Phenology].VegetativePhotoperiodModifier.XYPairs.X = 12.25, 15.6
            [Phenology].ReproductivePhotoperiodModifier.XYPairs.X = 12.25, 15.6
      SurfaceOrganicMatter: InitialResidueName=soybean; InitialResidueType=soybean; InitialResidueMass=2000; InitialStandingFraction=0.2; InitialCPR=0; InitialCNR=20
      Manager Sowing
        Crop = [Soybean]
        SowDate = 25-May
        StartDate = 15-march
        EndDate = 31-may
        MinESW = 100
        MinRain = 25
        RainDays = 7
        ForceSow = True
        CultivarName = mid2
        SowingDepth = 30
        RowSpacing = 750
        Population = 6
```csharp
using Models.Interfaces;
using APSIM.Shared.Utilities;
using Models.Utilities;
using Models.Soils;
using Models.PMF;
using Models.Core;
using System;
using System.Linq;
using Models.Climate;

namespace Models
{
    [Serializable]
    public class Script : Model
    {
        [Link] private Clock Clock;
        [Link] private Fertiliser Fertiliser;
        [Link] private Summary Summary;
        [Link] private Soil Soil;
        private Accumulator accumulatedRain;
        [Link]
        private ISoilWater waterBalance;

        [Description("Crop")]
        public IPlant Crop { get; set; }

		[Separator("If Sowing Date is specified")]
		[Description("Sowing date (d-mmm)")]
        public string SowDate { get; set; }

		[Separator("If Sowing Date is not specified")]
        [Description("Start of sowing window (d-mmm)")]
        public string StartDate { get; set; }

        [Description("End of sowing window (d-mmm)")]
        public string EndDate { get; set; }

        [Description("Minimum extractable soil water for sowing (mm)")]
        public double MinESW { get; set; }

        [Description("Accumulated rainfall required for sowing (mm)")]
        public double MinRain { get; set; }

        [Description("Duration of rainfall accumulation (d)")]
        public int RainDays { get; set; }
        
        [Description("Force sowing by end of window?")]
        public bool ForceSow { get; set; }

		[Separator("Sowing Parameters")]
        [Display(Type = DisplayType.CultivarName)]
        [Description("Cultivar to be sown")]
        public string CultivarName { get; set; }

        [Description("Sowing depth (mm)")]
        public double SowingDepth { get; set; }

        [Description("Row spacing (mm)")]
        public double RowSpacing { get; set; }

        [Description("Plant population (/m2)")]
        public double Population { get; set; }

        
        public string SimSowDate { get; set; }
        public bool SeasonOpen { get; set; }
        
        [EventSubscribe("StartOfSimulation")]
        private void OnSimulationCommencing(object sender, EventArgs e)
        {
            accumulatedRain = new Accumulator(this, "[Weather].Rain", RainDays);
            SeasonOpen = true;
        }

        [EventSubscribe("DoManagement")]
        private void OnDoManagement(object sender, EventArgs e)
        {
            accumulatedRain.Update();
            SimSowDate = "NA";
            bool SowNow = false;
            
            if (SeasonOpen) { // Only allow one attempt at sowing.
                if (SowDate != "NA") {
		            if (DateUtilities.WithinDates(SowDate, Clock.Today, SowDate)) // Sow at date specified.
		            {
		               SowNow = true;
		            }
                } else { 
                    if (DateUtilities.WithinDates(StartDate, Clock.Today, EndDate) && // If no date specified, sow when parameters met. 
		                    !Crop.IsAlive &&
		                    MathUtilities.Sum(waterBalance.ESW) > MinESW &&
		                    accumulatedRain.Sum > MinRain)
		                {
		                    SowNow = true;
		                } 
		            if (ForceSow && // If it's the end of the sowing window and we haven't sown yet, sow. 
		                    !Crop.IsAlive &&
		                    DateUtilities.DatesEqual(EndDate, Clock.Today)) 
		                {
		                    SowNow = true;
		                }
		         }
		     }
		     
		     if (SowNow) {
		        Crop.Sow(population: Population, cultivar: CultivarName, depth: SowingDepth, rowSpacing: RowSpacing);    
		         	   SimSowDate = Clock.Today.ToString("yyyy-MM-dd");
		         	   SeasonOpen = false;
		     }
		     
        }
    }
}
```
      Manager Fertilise at sowing
        Crop = [Soybean]
        FertiliserType = UreaN
        Amount = 220
```csharp
using Models.Soils;
using System;
using System.Linq;
using Models.Core;
using Models.PMF;
namespace Models
{
    [Serializable]
    public class Script : Model
    {
        [Link] Clock Clock;
        [Link] Fertiliser Fertiliser;
        
        [Description("Crop to be fertilised")]
        public IPlant Crop { get; set; }

        [Description("Type of fertiliser to apply? ")] 
        [Display(Type = DisplayType.FertiliserType)]public string FertiliserType { get; set; }
    
        [Description("Amount of fertiliser to be applied (kg/ha)")]
        public double Amount { get; set; }
        
        [EventSubscribe("Sowing")]
        private void OnSowing(object sender, EventArgs e)
        {
            Model crop = sender as Model;
            if (Crop != null && crop.Name.ToLower() == (Crop as IModel).Name.ToLower())
                Fertiliser.Apply(amount: Amount, type: FertiliserType);
        }
    }
}
```
      Manager Tillage on a fixed date
        TillageDate = 20-mar
        Fraction = 0.4
        Depth = 150
```csharp
using Models.Soils;
using System;
using System.Linq;
using Models.Core;
using Models.PMF;
using APSIM.Shared.Utilities;
using Models.Surface;

namespace Models
{
    [Serializable]
    public class Script : Model
    {
        [Link] Clock Clock;
        [Link] SurfaceOrganicMatter SOM;
        
        [Description("Tillage Date")]
        public string TillageDate { get; set; }
        
        [Description("Fraction of Residues To Incorporate (0-1)")]
        public double Fraction { get; set; }

        [Description("Depth of Tillage (mm)")]
        public double Depth { get; set; }

        [EventSubscribe("DoManagement")]
        private void OnDoManagement(object sender, EventArgs e)
        {
            if (DateUtilities.WithinDates(TillageDate, Clock.Today, TillageDate))
                SOM.Incorporate(Fraction, Depth);
        }
    }
}
```
      Manager ReaperMan
        GermWait = 30
        EmergWait = 30
        LethalFrost = -2.5
        MaxStall = 14
```csharp
using APSIM.Shared.Utilities;
using Models.Utilities;
using Models.Soils;
using Models.PMF;
using Models.Core;
using System;
using System.Linq;
using Models.Functions;
using System.Diagnostics;
using Models.Climate;

namespace Models
{
    [Serializable] 
    public class Script : Model
    {
		[Link] Clock Clock;
        [Link] Zone Zone;
        [Link] Weather Weather;
        [Link] Summary Summary;
        [Link] IEvent Events = null;
        [Link] IPlant Crop;
        
        [Separator("Triggers to kill the crop")]

        [Description("Number of days to wait before killing ungerminated plants")] 
        public int GermWait { get; set; }  
        
        [Description("Number of days to wait before killing unemerged plants")] 
        public int EmergWait { get; set; }  
        
        [Description("Kill if maximum daily tempterature is below (C)")]  
        public double LethalFrost { get; set; }
        
        [Description("Number of days to wait before killing stalled plants")] 
        public int MaxStall { get; set; }  
        public double PrevStage {get; set;}
        public int StalledFor {get; set;}  
        
        private DateTime GerminationDeadline; 
        private DateTime EmergenceDeadline; 
         
        public string SimMatDate {get; set;} 
        public bool WasSown {get; set;}
        public bool MatDateRecorded {get; set;} 
        public string SimHarvestDate {get; set;} 
        public string Result {get; set;}   
        
        [EventSubscribe("StartOfSimulation")]
        private void OnStartOfSimulation(object sender, EventArgs e)
        {
            double PrevStage = 0;
            double StalledFor = 0;
            bool WasSown = false;
        }
        
        [EventSubscribe("Sowing")]
        private void OnSowing(object sender, EventArgs e)
        {
            GerminationDeadline = Clock.Today.AddDays(GermWait);
            EmergenceDeadline = Clock.Today.AddDays(EmergWait);
            WasSown = true;
            MatDateRecorded = false;
            
        }
        
        [EventSubscribe("DoManagement")]
        private void OnDoManagement(object sender, EventArgs e)
        {
  			bool End = false;
  			double Stage = (double)Crop.FindByPath("Phenology.Stage").Value; 
  			Result = "NA";
  			
  			if (Stage >= 10 && MatDateRecorded == false) {
	            SimMatDate = Clock.Today.ToString("yyyy-MM-dd");
	            MatDateRecorded = true;
	        } else {
	        	SimMatDate = "NA";
	        }
  			
            if (Crop.IsReadyForHarvesting)
            {
            	Summary.WriteMessage(this, "Result: Harvested at Maturity.", MessageType.Diagnostic);
                End = true;
                Result = "Harvested at Maturity.";
            } 
            else if (Crop.IsAlive) 
            {
	        	double LAI = (double)Crop.FindByPath("Leaf.LAI").Value; 
	        	        	
		        if (Stage == PrevStage) {
		        	StalledFor += 1;
		        	if (StalledFor >= MaxStall)
		        	{
			        	Summary.WriteMessage(this, "Result: Stalled, killed.", MessageType.Diagnostic);
			        	StalledFor = 0;
			        	PrevStage = 0;
						End = true;
						Result = "Stalled, killed.";
		        	}
		        } 
		        else 
		        {
		       		StalledFor = 0;
		        }
				PrevStage = Stage;

	        	if (Clock.Today == GerminationDeadline && Stage < 2)
	               {
	               Summary.WriteMessage(this, "Result: Failed to Germinate.", MessageType.Diagnostic);
	               End = true;
	               Result = "Failed to Germinate.";
		        }
	            else if (Clock.Today == EmergenceDeadline && Stage < 3)
	               {
	               Summary.WriteMessage(this, "Result: Failed to Emerge.", MessageType.Diagnostic);
				   End = true;
				   Result = "Failed to Emerge.";
		        }
		        else if (Weather.MaxT <= LethalFrost && Stage < 9)
	               {
	               Summary.WriteMessage(this, "Result: Dead from Frost.", MessageType.Diagnostic);
				   End = true;
				   Result = "Dead from Frost.";
		        }
		        else if (LAI <= 0.001 && Stage > 4 && Stage < 9.9)
	               {
	               Summary.WriteMessage(this, "Result: Dead from Total Senescence (0 LAI between Flowering and Maturation).", MessageType.Diagnostic);
				   End = true;
				   Result = "Dead from Total Senescence.";
		        }
	        }
	        
	        if (Clock.Today == Clock.EndDate) {
	            if (!WasSown) { 
                    Summary.WriteMessage(this, "Result: Unable to Meet Sowing Conditions.", MessageType.Diagnostic);
                    Result = "Unable to Meet Sowing Conditions.";
                }
	        }
	        
	        if (End == true) {
				Crop.Harvest();
		        Crop.EndCrop();
	            SimHarvestDate = Clock.Today.ToString("yyyy-MM-dd");
	        } else {
	        	SimHarvestDate = "NA";
	        }
      	}
    }
}
```
      Report: EventNames=[Clock].DoReport
        VariableNames:
          [Clock].Today as Date
          [Clock].Today.Year as Year
          [Clock].Today.DayOfYear as DOY
          [Phenology].CurrentPhaseName as StageName
          [Phenology].Stage as Stage
          [Sowing].Script.SimSowDate as SimSowDate
          [ReaperMan].Script.SimMatDate as SimMatDate
          [ReaperMan].Script.SimHarvestDate as SimHarvestDate
          [Weather].Rain as Rain
          [Weather].Radn as Radn
          [Weather].MaxT as MaxT
          [Weather].MeanT as MeanT
          [Weather].MinT as MinT
          [Soybean].Phenology.ThermalTime as ThermalTime
          [Soybean].Phenology.AccumulatedEmergedTT as AccEmTT
          [Soybean].Grain.Wt*10 as Yieldkgha
          [Leaf].FRGR as FracGrowthRate
          [Photosynthesis].FN as NutrientStress
          [Photosynthesis].FT as TempStress
          [Photosynthesis].FW as WaterStress
          [ReaperMan].Script.Result as Result
  DataStore
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