Simulations: Version=192
  Simulation
    Clock: Start=2007-03-01; End=2010-10-31
    Summary
    Weather: FileName=z_12.met; Latitude=40.764; Tav=10.5701; Amp=29.1048
    SoilArbitrator
    MicroClimate: a_interception=0; b_interception=1; c_interception=0; d_interception=0; SoilHeatFluxFraction=0; MinimumHeightDiffForNewLayer=0; NightInterceptionFraction=0; ReferenceHeight=2
    Zone Field: Area=1; Slope=0; AspectAngle=0; Altitude=50
      Fertiliser
      Soil: ASCOrder=Vertosol; ASCSubOrder=Black; SoilType=Clay; Site=Norwin; NearestTown=Norwin; Region=Darling Downs and Granite Belt; State=Queensland; Country=Australia; NaturalVegetation=Qld. Bluegrass, possible Qld. Blue gum; ApsoilNumber=900; Latitude=-27.581836; Longitude=151.320206; LocationAccuracy=+/- 20m; YearOfSampling=0
        DataSource=CSIRO Sustainable Ecosystems, Toowoomba; Characteriesd as part of the GRDC funded project"Doing it better, doing it smarter, managing soil water in Australian agriculture' 2011
        Comments=Clay - OC, CLL for all crops estimated-based on Bongeen Mywybilla Soil No1
        Physical
          Thickness  ParticleSizeSand  ParticleSizeSilt  ParticleSizeClay  Rocks  BD       AirDry    LL15      DUL       SAT       KS
          150        5                 65                30                0      1.01056  0.13025   0.2605    0.521     0.588655  20
          150        5                 65                30                0      1.07146  0.198689  0.248362  0.496723  0.565677  20
          300        5                 65                30                0      1.09394  0.28      0.28      0.488438  0.557193  20
          300        5                 65                30                0      1.15861  0.28      0.28      0.480297  0.532787  20
          300        5                 65                30                0      1.17301  0.28      0.28      0.471584  0.527354  20
          300        5                 65                30                0      1.16287  0.28      0.28      0.457071  0.53118   20
          300        5                 65                30                0      1.1875   0.28      0.28      0.452332  0.521888  20
          Rocks, ParticleSizeSand, ParticleSizeSilt, ParticleSizeClay source: Calculated
          SoilCrop MaizeSoil: LL=[0.261, 0.248, 0.28, 0.306, 0.36, 0.392, 0.446]; KL=[0.06, 0.06, 0.06, 0.04, 0.04, 0.02, 0.01]; XF=[1, 1, 1, 1, 1, 1, 1]
        WaterBalance SoilWater: SummerDate=1-Nov; SummerU=5; SummerCona=5; WinterDate=1-Apr; WinterU=5; WinterCona=5; DiffusConst=40; DiffusSlope=16; Salb=0.12; CN2Bare=73; CNRed=20; CNCov=0.8; PSIDul=-100; Thickness=[150, 150, 300, 300, 300, 300, 300]; SWCON=[0.3, 0.3, 0.3, 0.3, 0.3, 0.3, 0.3]
        Organic: FOMCNRatio=40; CarbonUnits=Total
          Thickness  Carbon  SoilCNRatio  FBiom  FInert  FOM
          150        1.2     12           0.04   0.4     347.129
          150        0.96    12           0.02   0.6     270.344
          300        0.6     12           0.02   0.8     163.972
          300        0.3     12           0.02   1       99.4541
          300        0.18    12           0.01   1       60.322
          300        0.12    12           0.01   1       36.5871
          300        0.12    12           0.01   1       22.1912
        Chemical: PHUnits=Water
          Thickness  PH  CEC
          150        8   11.045
          150        8   10.505
          300        8   9.695
          300        8   9.02
          300        8   8.75
          300        8   8.615
          300        8   8.615
          CEC source: Calculated
        Water: Thickness=[150, 150, 300, 300, 300, 300, 300]; InitialPAWmm=361.245; RelativeTo=LL15; FilledFromTop=false
          InitialValues=[0.521, 0.496723, 0.488438, 0.480297, 0.471584, 0.457071, 0.452332]
        Nutrient
        Solute NO3: Thickness=[150, 150, 300, 300, 300, 300, 300]; InitialValues=[1, 1, 1, 1, 1, 1, 1]; InitialValuesUnits=ppm; WaterTableConcentration=0; D0=0; DepthConstant=0; MaxDepthSoluteAccessible=0; RunoffEffectivenessAtMovingSolute=0; MaxEffectiveRunoff=0
        Solute NH4: Thickness=[150, 150, 300, 300, 300, 300, 300]; InitialValues=[0.1, 0.1, 0.1, 0.1, 0.1, 0.1, 0.1]; InitialValuesUnits=ppm; WaterTableConcentration=0; D0=0; DepthConstant=0; MaxDepthSoluteAccessible=0; RunoffEffectivenessAtMovingSolute=0; MaxEffectiveRunoff=0
        Solute Urea: Thickness=[150, 150, 300, 300, 300, 300, 300]; InitialValues=[0, 0, 0, 0, 0, 0, 0]; InitialValuesUnits=kg/ha; WaterTableConcentration=0; D0=0; DepthConstant=0; MaxDepthSoluteAccessible=0; RunoffEffectivenessAtMovingSolute=0; MaxEffectiveRunoff=0
        SoilTemperature Temperature
      Plant Maize
      SurfaceOrganicMatter: InitialResidueName=soybean; InitialResidueType=soybean; InitialResidueMass=2000; InitialStandingFraction=0.2; InitialCPR=0; InitialCNR=20
      Manager Sowing
        Crop = [Maize]
        SowDate = NA
        StartDate = 15-march
        EndDate = 31-may
        MinESW = 100
        MinRain = 25
        RainDays = 7
        ForceSow = True
        CultivarName = B_80
        SowingDepth = 50
        RowSpacing = 500
        Population = 8
```csharp
using Models.Interfaces;
using APSIM.Shared.Utilities;
using Models.Utilities;
using Models.Soils;
using Models.PMF;
using Models.Core;
using System;
using System.Linq;
using Models.Climate;

namespace Models
{
    [Serializable]
    public class Script : Model
    {
        [Link] private Clock Clock;
        [Link] private Fertiliser Fertiliser;
        [Link] private Summary Summary;
        [Link] private Soil Soil;
        private Accumulator accumulatedRain;
        [Link]
        private ISoilWater waterBalance;

        [Description("Crop")]
        public IPlant Crop { get; set; }

		[Separator("If Sowing Date is specified")]
		[Description("Sowing date (d-mmm)")]
        public string SowDate { get; set; }

		[Separator("If Sowing Date is not specified")]
        [Description("Start of sowing window (d-mmm)")]
        public string StartDate { get; set; }

        [Description("End of sowing window (d-mmm)")]
        public string EndDate { get; set; }

        [Description("Minimum extractable soil water for sowing (mm)")]
        public double MinESW { get; set; }

        [Description("Accumulated rainfall required for sowing (mm)")]
        public double MinRain { get; set; }

        [Description("Duration of rainfall accumulation (d)")]
        public int RainDays { get; set; }
        
        [Description("Force sowing by end of window?")]
        public bool ForceSow { get; set; }

		[Separator("Sowing Parameters")]
        [Display(Type = DisplayType.CultivarName)]
        [Description("Cultivar to be sown")]
        public string CultivarName { get; set; }

        [Description("Sowing depth (mm)")]
        public double SowingDepth { get; set; }

        [Description("Row spacing (mm)")]
        public double RowSpacing { get; set; }

        [Description("Plant population (/m2)")]
        public double Population { get; set; }

        
        public string SimSowDate { get; set; }
        public bool SeasonOpen { get; set; }
        
        [EventSubscribe("StartOfSimulation")]
        private void OnSimulationCommencing(object sender, EventArgs e)
        {
            accumulatedRain = new Accumulator(this, "[Weather].Rain", RainDays);
            SeasonOpen = true;
        }

        [EventSubscribe("DoManagement")]
        private void OnDoManagement(object sender, EventArgs e)
        {
            accumulatedRain.Update();
            SimSowDate = "NA";
            bool SowNow = false;
            
            if (SeasonOpen) { // Only allow one attempt at sowing.
                if (SowDate != "NA") {
		            if (DateUtilities.WithinDates(SowDate, Clock.Today, SowDate)) // Sow at date specified.
		            {
		               SowNow = true;
		            }
                } else { 
                    if (DateUtilities.WithinDates(StartDate, Clock.Today, EndDate) && // If no date specified, sow when parameters met. 
		                    !Crop.IsAlive &&
		                    MathUtilities.Sum(waterBalance.ESW) > MinESW &&
		                    accumulatedRain.Sum > MinRain)
		                {
		                    SowNow = true;
		                } 
		            if (ForceSow && // If it's the end of the sowing window and we haven't sown yet, sow. 
		                    !Crop.IsAlive &&
		                    DateUtilities.DatesEqual(EndDate, Clock.Today)) 
		                {
		                    SowNow = true;
		                }
		         }
		     }
		     
		     if (SowNow) {
		        Crop.Sow(population: Population, cultivar: CultivarName, depth: SowingDepth, rowSpacing: RowSpacing);    
		         	   SimSowDate = Clock.Today.ToString("yyyy-MM-dd");
		         	   SeasonOpen = false;
		     }
		     
        }
    }
}
```
      Manager Fertilise at sowing
        Crop = [Maize]
        FertiliserType = UreaN
        Amount = 220
```csharp
using Models.Soils;
using System;
using System.Linq;
using Models.Core;
using Models.PMF;
namespace Models
{
    [Serializable]
    public class Script : Model
    {
        [Link] Clock Clock;
        [Link] Fertiliser Fertiliser;
        
        [Description("Crop to be fertilised")]
        public IPlant Crop { get; set; }

        [Description("Type of fertiliser to apply? ")] 
        [Display(Type = DisplayType.FertiliserType)]public string FertiliserType { get; set; }
    
        [Description("Amount of fertiliser to be applied (kg/ha)")]
        public double Amount { get; set; }
        
        [EventSubscribe("Sowing")]
        private void OnSowing(object sender, EventArgs e)
        {
            Model crop = sender as Model;
            if (Crop != null && crop.Name.ToLower() == (Crop as IModel).Name.ToLower())
                Fertiliser.Apply(amount: Amount, type: FertiliserType);
        }
    }
}
```
      Manager Tillage on a fixed date
        TillageDate = 20-mar
        Fraction = 0.4
        Depth = 150
```csharp
using Models.Soils;
using System;
using System.Linq;
using Models.Core;
using Models.PMF;
using APSIM.Shared.Utilities;
using Models.Surface;

namespace Models
{
    [Serializable]
    public class Script : Model
    {
        [Link] Clock Clock;
        [Link] SurfaceOrganicMatter SOM;
        
        [Description("Tillage Date")]
        public string TillageDate { get; set; }
        
        [Description("Fraction of Residues To Incorporate (0-1)")]
        public double Fraction { get; set; }

        [Description("Depth of Tillage (mm)")]
        public double Depth { get; set; }

        [EventSubscribe("DoManagement")]
        private void OnDoManagement(object sender, EventArgs e)
        {
            if (DateUtilities.WithinDates(TillageDate, Clock.Today, TillageDate))
                SOM.Incorporate(Fraction, Depth);
        }
    }
}
```
      Manager ReaperMan
        GermWait = 30
        EmergWait = 30
        MaxStall = 14
        LethalFrost = -2.5
```csharp
using APSIM.Shared.Utilities;
using Models.Utilities;
using Models.Soils;
using Models.PMF;
using Models.Core;
using System;
using System.Linq;
using Models.Functions;
using System.Diagnostics;
using Models.Climate;

namespace Models
{
    [Serializable] 
    public class Script : Model
    {
		[Link] Clock Clock;
        [Link] Zone Zone;
        [Link] Weather Weather;
        [Link] Summary Summary;
        [Link] IEvent Events = null;
        [Link] IPlant Crop;
        
        [Separator("Triggers to kill the crop")]

        [Description("Number of days to wait before killing ungerminated plants")] 
        public int GermWait { get; set; }  
        
        [Description("Number of days to wait before killing unemerged plants")] 
        public int EmergWait { get; set; }  
         
        [Description("Number of days to wait before killing stalled plants")] 
        public int MaxStall { get; set; }  
        public double PrevStage {get; set;}
        public int StalledFor {get; set;}  
        
        [Description("Kill if maximum daily tempterature is below (C)")]  
        public double LethalFrost { get; set; }
        
        private DateTime GerminationDeadline; 
        private DateTime EmergenceDeadline; 
         
        public string SimMatDate {get; set;} 
        public bool WasSown {get; set;}
        public bool MatDateRecorded {get; set;} 
        public string SimHarvestDate {get; set;} 
        public string Result {get; set;}   
        
        [EventSubscribe("StartOfSimulation")]
        private void OnStartOfSimulation(object sender, EventArgs e)
        {
            double PrevStage = 0;
            double StalledFor = 0;
            bool WasSown = false;
        }
        
        [EventSubscribe("Sowing")]
        private void OnSowing(object sender, EventArgs e)
        {
            GerminationDeadline = Clock.Today.AddDays(GermWait);
            EmergenceDeadline = Clock.Today.AddDays(EmergWait);
            WasSown = true;
            MatDateRecorded = false;
            
        }
        
        [EventSubscribe("DoManagement")]
        private void OnDoManagement(object sender, EventArgs e)
        {
  			bool End = false;
  			double Stage = (double)Crop.FindByPath("Phenology.Stage").Value; 
  			Result = "NA";
  			
  			if (Stage >= 10 && MatDateRecorded == false) {
	            SimMatDate = Clock.Today.ToString("yyyy-MM-dd");
	            MatDateRecorded = true;
	        } else {
	        	SimMatDate = "NA";
	        }
  			
            if (Crop.IsReadyForHarvesting)
            {
            	Summary.WriteMessage(this, "Result: Harvested at Maturity.", MessageType.Diagnostic);
                End = true;
                Result = "Harvested at Maturity.";
            } 
            else if (Crop.IsAlive) 
            {
	        	double LAI = (double)Crop.FindByPath("Leaf.LAI").Value; 
	        	        	
		        if (Stage == PrevStage) {
		        	StalledFor += 1;
		        	if (StalledFor >= MaxStall)
		        	{
			        	Summary.WriteMessage(this, "Result: Stalled, killed.", MessageType.Diagnostic);
			        	StalledFor = 0;
			        	PrevStage = 0;
						End = true;
						Result = "Stalled, killed.";
		        	}
		        } 
		        else 
		        {
		       		StalledFor = 0;
		        }
				PrevStage = Stage;

	        	if (Clock.Today == GerminationDeadline && Stage < 2)
	               {
	               Summary.WriteMessage(this, "Result: Failed to Germinate.", MessageType.Diagnostic);
	               End = true;
	               Result = "Failed to Germinate.";
		        }
	            else if (Clock.Today == EmergenceDeadline && Stage < 3)
	               {
	               Summary.WriteMessage(this, "Result: Failed to Emerge.", MessageType.Diagnostic);
				   End = true;
				   Result = "Failed to Emerge.";
		        }
		        else if (Weather.MaxT <= LethalFrost && Stage < 9)
	               {
	               Summary.WriteMessage(this, "Result: Dead from Frost.", MessageType.Diagnostic);
				   End = true;
				   Result = "Dead from Frost.";
		        }
		        else if (LAI <= 0.001 && Stage > 4 && Stage < 9.9)
	               {
	               Summary.WriteMessage(this, "Result: Dead from Total Senescence (0 LAI between Flowering and Maturation).", MessageType.Diagnostic);
				   End = true;
				   Result = "Dead from Total Senescence.";
		        }
	        }
	        
	        if (Clock.Today == Clock.EndDate) {
	            if (!WasSown) { 
                    Summary.WriteMessage(this, "Result: Unable to Meet Sowing Conditions.", MessageType.Diagnostic);
                    Result = "Unable to Meet Sowing Conditions.";
                }
	        }
	        
	        if (End == true) {
				Crop.Harvest();
		        Crop.EndCrop();
	            SimHarvestDate = Clock.Today.ToString("yyyy-MM-dd");
	        } else {
	        	SimHarvestDate = "NA";
	        }
      	}
    }
}
```
      Report: EventNames=[Clock].DoReport
        VariableNames:
          [Clock].Today as Date
          [Clock].Today.Year as Year
          [Clock].Today.DayOfYear as DOY
          [Phenology].CurrentPhaseName as PhaseName
          [Phenology].Stage as Stage
          [Sowing].Script.SimSowDate as SimSowDate
          [ReaperMan].Script.SimMatDate as SimMatDate
          [ReaperMan].Script.SimHarvestDate as SimHarvestDate
          [Weather].Rain as Rain
          [Weather].Radn as Radn
          [Weather].MaxT as MaxT
          [Weather].MeanT as MeanT
          [Weather].MinT as MinT
          [Phenology].ThermalTime as ThermalTime
          [Phenology].AccumulatedEmergedTT as AccEmTT
          [Soil].Temperature.Value[2] as SoilTemp
          sum([Soil].Water.PAWmm) as PAWmm
          sum([Soil].NH4.kgha) as NH4
          sum([Soil].NO3.kgha) as NO3
          sum([Soil].Urea.kgha) as Urea
          sum([Nutrient].Organic.C) as OrganicC
          [Photosynthesis].FN as NutrientStress
          [Photosynthesis].FT as TempStress
          [Photosynthesis].FW as WaterStress
          [ReaperMan].Script.Result as Result
  DataStore
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