Simulations: Version=171
  Simulation
    Clock: Start=2001-01-01; End=2001-12-31
    Summary
    Weather: FileName=z_12.met
    SoilArbitrator
    MicroClimate: a_interception=0; b_interception=1; c_interception=0; d_interception=0; SoilHeatFluxFraction=0; MinimumHeightDiffForNewLayer=0; NightInterceptionFraction=0; ReferenceHeight=2
    Zone Field: Area=1; Slope=0; AspectAngle=0; Altitude=50
      Fertiliser
      Soil: ASCOrder=Vertosol; ASCSubOrder=Black; SoilType=Clay; Site=Norwin; NearestTown=Norwin; Region=Darling Downs and Granite Belt; State=Queensland; Country=Australia; NaturalVegetation=Qld. Bluegrass, possible Qld. Blue gum; ApsoilNumber=900; Latitude=-27.581836; Longitude=151.320206; LocationAccuracy=+/- 20m; YearOfSampling=0
        DataSource=CSIRO Sustainable Ecosystems, Toowoomba; Characteriesd as part of the GRDC funded project"Doing it better, doing it smarter, managing soil water in Australian agriculture' 2011
        Comments=Clay - OC, CLL for all crops estimated-based on Bongeen Mywybilla Soil No1
        Physical
          Thickness  BD     AirDry  LL15   DUL    SAT    KS
          150        1.011  0.13    0.261  0.521  0.589  20
          150        1.071  0.199   0.248  0.497  0.566  20
          300        1.094  0.28    0.28   0.488  0.557  20
          300        1.159  0.28    0.28   0.48   0.533  20
          300        1.173  0.28    0.28   0.472  0.527  20
          300        1.163  0.28    0.28   0.457  0.531  20
          300        1.187  0.28    0.28   0.452  0.522  20
          SoilCrop SoybeanSoil: LL=[0.261, 0.248, 0.28, 0.306, 0.36, 0.392, 0.446]; KL=[0.06, 0.06, 0.06, 0.04, 0.04, 0.02, 0.01]; XF=[1, 1, 1, 1, 1, 1, 1]
        WaterBalance SoilWater: SummerDate=1-Jun; SummerU=9.05; SummerCona=4; WinterDate=1-Nov; WinterU=9.05; WinterCona=4; DiffusConst=40; DiffusSlope=16; Salb=0.15; CN2Bare=78; CNRed=20; CNCov=0.8; PSIDul=-100; Thickness=[150, 150, 300, 300, 300, 300, 300]; SWCON=[0.3, 0.3, 0.3, 0.3, 0.3, 0.3, 0.3]
        Organic: FOMCNRatio=40; CarbonUnits=Total
          Thickness  Carbon  SoilCNRatio  FBiom  FInert  FOM
          150        1.2     12           0.04   0.4     347.129
          150        0.96    12           0.02   0.6     270.344
          300        0.6     12           0.02   0.8     163.972
          300        0.3     12           0.02   1       99.454
          300        0.18    12           0.01   1       60.322
          300        0.12    12           0.01   1       36.587
          300        0.12    12           0.01   1       22.191
        Chemical: Thickness=[150, 150, 300, 300, 300, 300, 300]; PH=[8, 8, 8, 8, 8, 8, 8]; PHUnits=Water
        Water: Thickness=[150, 150, 300, 300, 300, 300, 300]; InitialValues=[0.521, 0.497, 0.488, 0.48, 0.472, 0.457, 0.452]; InitialPAWmm=361.05; RelativeTo=LL15; FilledFromTop=false
        CERESSoilTemperature Temperature
        Nutrient
        Solute NO3: Thickness=[150, 150, 300, 300, 300, 300, 300]; InitialValues=[1, 1, 1, 1, 1, 1, 1]; InitialValuesUnits=ppm; WaterTableConcentration=0; D0=0; DepthConstant=0; MaxDepthSoluteAccessible=0; RunoffEffectivenessAtMovingSolute=0; MaxEffectiveRunoff=0
        Solute NH4: Thickness=[150, 150, 300, 300, 300, 300, 300]; InitialValues=[0.1, 0.1, 0.1, 0.1, 0.1, 0.1, 0.1]; InitialValuesUnits=ppm; WaterTableConcentration=0; D0=0; DepthConstant=0; MaxDepthSoluteAccessible=0; RunoffEffectivenessAtMovingSolute=0; MaxEffectiveRunoff=0
        Solute Urea: Thickness=[150, 150, 300, 300, 300, 300, 300]; InitialValues=[0, 0, 0, 0, 0, 0, 0]; InitialValuesUnits=kg/ha; WaterTableConcentration=0; D0=0; DepthConstant=0; MaxDepthSoluteAccessible=0; RunoffEffectivenessAtMovingSolute=0; MaxEffectiveRunoff=0
      Plant Soybean
        Cultivar early00
          Command:
            [Phenology].Vegetative.Target.FixedValue = 377
            [Phenology].EarlyFlowering.Target.FixedValue = 136
            [Phenology].EarlyPodDevelopment.Target.FixedValue = 174
            [Phenology].LateGrainFilling.Target.EntireGrainfillPeriod.FixedValue = 186
            [Phenology].Maturing.Target.FixedValue = 169
            [Phenology].Ripening.Target.FixedValue = 12
            [Phenology].VegetativePhotoperiodModifier.XYPairs.X = 14.31, 20.9
            [Phenology].ReproductivePhotoperiodModifier.XYPairs.X = 14.31, 20.9
        Cultivar mid00
          Command:
            [Phenology].Vegetative.Target.FixedValue = 276
            [Phenology].EarlyFlowering.Target.FixedValue = 144
            [Phenology].EarlyPodDevelopment.Target.FixedValue = 186
            [Phenology].LateGrainFilling.Target.EntireGrainfillPeriod.FixedValue = 165
            [Phenology].Maturing.Target.FixedValue = 164
            [Phenology].Ripening.Target.FixedValue = 78
            [Phenology].VegetativePhotoperiodModifier.XYPairs.X = 14.23, 20.46
            [Phenology].ReproductivePhotoperiodModifier.XYPairs.X = 14.23, 20.46
        Cultivar late00
          Command:
            [Phenology].Vegetative.Target.FixedValue = 275
            [Phenology].EarlyFlowering.Target.FixedValue = 145
            [Phenology].EarlyPodDevelopment.Target.FixedValue = 188
            [Phenology].LateGrainFilling.Target.EntireGrainfillPeriod.FixedValue = 165
            [Phenology].Maturing.Target.FixedValue = 165
            [Phenology].Ripening.Target.FixedValue = 78
            [Phenology].VegetativePhotoperiodModifier.XYPairs.X = 14.15, 20.05
            [Phenology].ReproductivePhotoperiodModifier.XYPairs.X = 14.15, 20.05
        Cultivar early0
          Command:
            [Phenology].Vegetative.Target.FixedValue = 283
            [Phenology].EarlyFlowering.Target.FixedValue = 152
            [Phenology].EarlyPodDevelopment.Target.FixedValue = 195
            [Phenology].LateGrainFilling.Target.EntireGrainfillPeriod.FixedValue = 169
            [Phenology].Maturing.Target.FixedValue = 168
            [Phenology].Ripening.Target.FixedValue = 82
            [Phenology].VegetativePhotoperiodModifier.XYPairs.X = 14.06, 19.65
            [Phenology].ReproductivePhotoperiodModifier.XYPairs.X = 14.06, 19.65
        Cultivar mid0
          Command:
            [Phenology].Vegetative.Target.FixedValue = 283
            [Phenology].EarlyFlowering.Target.FixedValue = 150
            [Phenology].EarlyPodDevelopment.Target.FixedValue = 192
            [Phenology].LateGrainFilling.Target.EntireGrainfillPeriod.FixedValue = 168
            [Phenology].Maturing.Target.FixedValue = 167
            [Phenology].Ripening.Target.FixedValue = 81
            [Phenology].VegetativePhotoperiodModifier.XYPairs.X = 13.98, 19.27
            [Phenology].ReproductivePhotoperiodModifier.XYPairs.X = 13.98, 19.27
        Cultivar late0
          Command:
            [Phenology].Vegetative.Target.FixedValue = 287
            [Phenology].EarlyFlowering.Target.FixedValue = 149
            [Phenology].EarlyPodDevelopment.Target.FixedValue = 191
            [Phenology].LateGrainFilling.Target.EntireGrainfillPeriod.FixedValue = 167
            [Phenology].Maturing.Target.FixedValue = 166
            [Phenology].Ripening.Target.FixedValue = 80
            [Phenology].VegetativePhotoperiodModifier.XYPairs.X = 13.89, 18.91
            [Phenology].ReproductivePhotoperiodModifier.XYPairs.X = 13.89, 18.91
        Cultivar early1
          Command:
            [Phenology].Vegetative.Target.FixedValue = 299
            [Phenology].EarlyFlowering.Target.FixedValue = 158
            [Phenology].EarlyPodDevelopment.Target.FixedValue = 201
            [Phenology].LateGrainFilling.Target.EntireGrainfillPeriod.FixedValue = 172
            [Phenology].Maturing.Target.FixedValue = 171
            [Phenology].Ripening.Target.FixedValue = 85
            [Phenology].VegetativePhotoperiodModifier.XYPairs.X = 13.81, 18.57
            [Phenology].ReproductivePhotoperiodModifier.XYPairs.X = 13.81, 18.57
        Cultivar mid1
          Command:
            [Phenology].Vegetative.Target.FixedValue = 293
            [Phenology].EarlyFlowering.Target.FixedValue = 153
            [Phenology].EarlyPodDevelopment.Target.FixedValue = 195
            [Phenology].LateGrainFilling.Target.EntireGrainfillPeriod.FixedValue = 169
            [Phenology].Maturing.Target.FixedValue = 168
            [Phenology].Ripening.Target.FixedValue = 82
            [Phenology].VegetativePhotoperiodModifier.XYPairs.X = 13.73, 18.25
            [Phenology].ReproductivePhotoperiodModifier.XYPairs.X = 13.73, 18.25
        Cultivar late1
          Command:
            [Phenology].Vegetative.Target.FixedValue = 285
            [Phenology].EarlyFlowering.Target.FixedValue = 155
            [Phenology].EarlyPodDevelopment.Target.FixedValue = 198
            [Phenology].LateGrainFilling.Target.EntireGrainfillPeriod.FixedValue = 170
            [Phenology].Maturing.Target.FixedValue = 170
            [Phenology].Ripening.Target.FixedValue = 83
            [Phenology].VegetativePhotoperiodModifier.XYPairs.X = 13.64, 17.94
            [Phenology].ReproductivePhotoperiodModifier.XYPairs.X = 13.64, 17.94
        Cultivar early2
          Command:
            [Phenology].Vegetative.Target.FixedValue = 281
            [Phenology].EarlyFlowering.Target.FixedValue = 165
            [Phenology].EarlyPodDevelopment.Target.FixedValue = 208
            [Phenology].LateGrainFilling.Target.EntireGrainfillPeriod.FixedValue = 175
            [Phenology].Maturing.Target.FixedValue = 174
            [Phenology].Ripening.Target.FixedValue = 88
            [Phenology].VegetativePhotoperiodModifier.XYPairs.X = 13.56, 17.66
            [Phenology].ReproductivePhotoperiodModifier.XYPairs.X = 13.56, 17.66
        Cultivar mid2
          Command:
            [Phenology].Vegetative.Target.FixedValue = 276
            [Phenology].EarlyFlowering.Target.FixedValue = 168
            [Phenology].EarlyPodDevelopment.Target.FixedValue = 210
            [Phenology].LateGrainFilling.Target.EntireGrainfillPeriod.FixedValue = 177
            [Phenology].Maturing.Target.FixedValue = 176
            [Phenology].Ripening.Target.FixedValue = 90
            [Phenology].VegetativePhotoperiodModifier.XYPairs.X = 13.47, 17.39
            [Phenology].ReproductivePhotoperiodModifier.XYPairs.X = 13.47, 17.39
        Cultivar late2
          Command:
            [Phenology].Vegetative.Target.FixedValue = 281
            [Phenology].EarlyFlowering.Target.FixedValue = 175
            [Phenology].EarlyPodDevelopment.Target.FixedValue = 217
            [Phenology].LateGrainFilling.Target.EntireGrainfillPeriod.FixedValue = 180
            [Phenology].Maturing.Target.FixedValue = 179
            [Phenology].Ripening.Target.FixedValue = 93
            [Phenology].VegetativePhotoperiodModifier.XYPairs.X = 13.39, 17.14
            [Phenology].ReproductivePhotoperiodModifier.XYPairs.X = 13.39, 17.14
        Cultivar early3
          Command:
            [Phenology].Vegetative.Target.FixedValue = 279
            [Phenology].EarlyFlowering.Target.FixedValue = 191
            [Phenology].EarlyPodDevelopment.Target.FixedValue = 234
            [Phenology].LateGrainFilling.Target.EntireGrainfillPeriod.FixedValue = 188
            [Phenology].Maturing.Target.FixedValue = 187
            [Phenology].Ripening.Target.FixedValue = 101
            [Phenology].VegetativePhotoperiodModifier.XYPairs.X = 13.3, 16.91
            [Phenology].ReproductivePhotoperiodModifier.XYPairs.X = 13.3, 16.91
        Cultivar mid3
          Command:
            [Phenology].Vegetative.Target.FixedValue = 261
            [Phenology].EarlyFlowering.Target.FixedValue = 184
            [Phenology].EarlyPodDevelopment.Target.FixedValue = 226
            [Phenology].LateGrainFilling.Target.EntireGrainfillPeriod.FixedValue = 185
            [Phenology].Maturing.Target.FixedValue = 184
            [Phenology].Ripening.Target.FixedValue = 98
            [Phenology].VegetativePhotoperiodModifier.XYPairs.X = 13.22, 16.7
            [Phenology].ReproductivePhotoperiodModifier.XYPairs.X = 13.22, 16.7
        Cultivar late3
          Command:
            [Phenology].Vegetative.Target.FixedValue = 264
            [Phenology].EarlyFlowering.Target.FixedValue = 196
            [Phenology].EarlyPodDevelopment.Target.FixedValue = 238
            [Phenology].LateGrainFilling.Target.EntireGrainfillPeriod.FixedValue = 191
            [Phenology].Maturing.Target.FixedValue = 190
            [Phenology].Ripening.Target.FixedValue = 103
            [Phenology].VegetativePhotoperiodModifier.XYPairs.X = 13.14, 16.51
            [Phenology].ReproductivePhotoperiodModifier.XYPairs.X = 13.14, 16.51
        Cultivar early4
          Command:
            [Phenology].Vegetative.Target.FixedValue = 290
            [Phenology].EarlyFlowering.Target.FixedValue = 227
            [Phenology].EarlyPodDevelopment.Target.FixedValue = 270
            [Phenology].LateGrainFilling.Target.EntireGrainfillPeriod.FixedValue = 206
            [Phenology].Maturing.Target.FixedValue = 206
            [Phenology].Ripening.Target.FixedValue = 119
            [Phenology].VegetativePhotoperiodModifier.XYPairs.X = 13.05, 16.33
            [Phenology].ReproductivePhotoperiodModifier.XYPairs.X = 13.05, 16.33
        Cultivar mid4
          Command:
            [Phenology].Vegetative.Target.FixedValue = 292
            [Phenology].EarlyFlowering.Target.FixedValue = 236
            [Phenology].EarlyPodDevelopment.Target.FixedValue = 278
            [Phenology].LateGrainFilling.Target.EntireGrainfillPeriod.FixedValue = 211
            [Phenology].Maturing.Target.FixedValue = 210
            [Phenology].Ripening.Target.FixedValue = 124
            [Phenology].VegetativePhotoperiodModifier.XYPairs.X = 12.97, 16.18
            [Phenology].ReproductivePhotoperiodModifier.XYPairs.X = 12.97, 16.18
        Cultivar late4
          Command:
            [Phenology].Vegetative.Target.FixedValue = 286
            [Phenology].EarlyFlowering.Target.FixedValue = 241
            [Phenology].EarlyPodDevelopment.Target.FixedValue = 284
            [Phenology].LateGrainFilling.Target.EntireGrainfillPeriod.FixedValue = 213
            [Phenology].Maturing.Target.FixedValue = 212
            [Phenology].Ripening.Target.FixedValue = 126
            [Phenology].VegetativePhotoperiodModifier.XYPairs.X = 12.88, 16.04
            [Phenology].ReproductivePhotoperiodModifier.XYPairs.X = 12.88, 16.04
        Cultivar early5
          Command:
            [Phenology].Vegetative.Target.FixedValue = 309
            [Phenology].EarlyFlowering.Target.FixedValue = 248
            [Phenology].EarlyPodDevelopment.Target.FixedValue = 290
            [Phenology].LateGrainFilling.Target.EntireGrainfillPeriod.FixedValue = 217
            [Phenology].Maturing.Target.FixedValue = 216
            [Phenology].Ripening.Target.FixedValue = 130
            [Phenology].VegetativePhotoperiodModifier.XYPairs.X = 12.8, 15.92
            [Phenology].ReproductivePhotoperiodModifier.XYPairs.X = 12.8, 15.92
        Cultivar mid5
          Command:
            [Phenology].Vegetative.Target.FixedValue = 346
            [Phenology].EarlyFlowering.Target.FixedValue = 253
            [Phenology].EarlyPodDevelopment.Target.FixedValue = 296
            [Phenology].LateGrainFilling.Target.EntireGrainfillPeriod.FixedValue = 220
            [Phenology].Maturing.Target.FixedValue = 219
            [Phenology].Ripening.Target.FixedValue = 132
            [Phenology].VegetativePhotoperiodModifier.XYPairs.X = 12.72, 15.82
            [Phenology].ReproductivePhotoperiodModifier.XYPairs.X = 12.72, 15.82
        Cultivar late5
          Command:
            [Phenology].Vegetative.Target.FixedValue = 325
            [Phenology].EarlyFlowering.Target.FixedValue = 252
            [Phenology].EarlyPodDevelopment.Target.FixedValue = 293
            [Phenology].LateGrainFilling.Target.EntireGrainfillPeriod.FixedValue = 218
            [Phenology].Maturing.Target.FixedValue = 217
            [Phenology].Ripening.Target.FixedValue = 131
            [Phenology].VegetativePhotoperiodModifier.XYPairs.X = 12.63, 15.74
            [Phenology].ReproductivePhotoperiodModifier.XYPairs.X = 12.63, 15.74
        Cultivar early6
          Command:
            [Phenology].Vegetative.Target.FixedValue = 320
            [Phenology].EarlyFlowering.Target.FixedValue = 257
            [Phenology].EarlyPodDevelopment.Target.FixedValue = 300
            [Phenology].LateGrainFilling.Target.EntireGrainfillPeriod.FixedValue = 221
            [Phenology].Maturing.Target.FixedValue = 221
            [Phenology].Ripening.Target.FixedValue = 134
            [Phenology].VegetativePhotoperiodModifier.XYPairs.X = 12.55, 15.67
            [Phenology].ReproductivePhotoperiodModifier.XYPairs.X = 12.55, 15.67
        Cultivar mid6
          Command:
            [Phenology].Vegetative.Target.FixedValue = 313
            [Phenology].EarlyFlowering.Target.FixedValue = 251
            [Phenology].EarlyPodDevelopment.Target.FixedValue = 293
            [Phenology].LateGrainFilling.Target.EntireGrainfillPeriod.FixedValue = 218
            [Phenology].Maturing.Target.FixedValue = 217
            [Phenology].Ripening.Target.FixedValue = 131
            [Phenology].VegetativePhotoperiodModifier.XYPairs.X = 12.46, 15.63
            [Phenology].ReproductivePhotoperiodModifier.XYPairs.X = 12.46, 15.63
        Cultivar late6
          Command:
            [Phenology].Vegetative.Target.FixedValue = 295
            [Phenology].EarlyFlowering.Target.FixedValue = 213
            [Phenology].EarlyPodDevelopment.Target.FixedValue = 256
            [Phenology].LateGrainFilling.Target.EntireGrainfillPeriod.FixedValue = 199
            [Phenology].Maturing.Target.FixedValue = 199
            [Phenology].Ripening.Target.FixedValue = 112
            [Phenology].VegetativePhotoperiodModifier.XYPairs.X = 12.38, 15.6
            [Phenology].ReproductivePhotoperiodModifier.XYPairs.X = 12.38, 15.6
        Cultivar early7
          Command:
            [Phenology].Vegetative.Target.FixedValue = 330
            [Phenology].EarlyFlowering.Target.FixedValue = 467
            [Phenology].EarlyPodDevelopment.Target.FixedValue = 477
            [Phenology].LateGrainFilling.Target.EntireGrainfillPeriod.FixedValue = 228
            [Phenology].Maturing.Target.FixedValue = 161
            [Phenology].Ripening.Target.FixedValue = 15
            [Phenology].VegetativePhotoperiodModifier.XYPairs.X = 12.29, 15.6
            [Phenology].ReproductivePhotoperiodModifier.XYPairs.X = 12.29, 15.6
        Cultivar mid7
          Command:
            [Phenology].Vegetative.Target.FixedValue = 337
            [Phenology].EarlyFlowering.Target.FixedValue = 527
            [Phenology].EarlyPodDevelopment.Target.FixedValue = 506
            [Phenology].LateGrainFilling.Target.EntireGrainfillPeriod.FixedValue = 218
            [Phenology].Maturing.Target.FixedValue = 140
            [Phenology].Ripening.Target.FixedValue = -5
            [Phenology].VegetativePhotoperiodModifier.XYPairs.X = 12.21, 15.61
            [Phenology].ReproductivePhotoperiodModifier.XYPairs.X = 12.21, 15.61
        Cultivar late7
          Command:
            [Phenology].Vegetative.Target.FixedValue = 343
            [Phenology].EarlyFlowering.Target.FixedValue = 594
            [Phenology].EarlyPodDevelopment.Target.FixedValue = 538
            [Phenology].LateGrainFilling.Target.EntireGrainfillPeriod.FixedValue = 204
            [Phenology].Maturing.Target.FixedValue = 114
            [Phenology].Ripening.Target.FixedValue = -26
            [Phenology].VegetativePhotoperiodModifier.XYPairs.X = 12.13, 15.64
            [Phenology].ReproductivePhotoperiodModifier.XYPairs.X = 12.13, 15.64
      SurfaceOrganicMatter: InitialResidueName=soybean; InitialResidueType=soybean; InitialResidueMass=2000; InitialStandingFraction=0.2; InitialCPR=0; InitialCNR=20
      Manager Sowing
        Crop = [Soybean]
        SowDate = NA
        StartDate = 15-march
        EndDate = 31-may
        MinESW = 100
        MinRain = 25
        RainDays = 7
        SowTemp = 10
        CultivarName = mid4
        SowingDepth = 30
        RowSpacing = 750
        Population = 6
```csharp
using Models.Interfaces;
using APSIM.Shared.Utilities;
using Models.Utilities;
using Models.Soils;
using Models.PMF;
using Models.Core;
using System;
using System.Linq;
using Models.Climate;

namespace Models
{
    [Serializable]
    public class Script : Model
    {
        [Link] private Clock Clock;
        [Link] private Fertiliser Fertiliser;
        [Link] private Summary Summary;
        [Link] private Soil Soil;
        private Accumulator accumulatedRain;
        [Link]
        private ISoilWater waterBalance;
		[Link] private CERESSoilTemperature CST;

        [Description("Crop")]
        public IPlant Crop { get; set; }

		[Separator("If Sowing Date is specified")]
		[Description("Sowing date (d-mmm)")]
        public string SowDate { get; set; }

		[Separator("If Sowing Date is not specified")]
        [Description("Start of sowing window (d-mmm)")]
        public string StartDate { get; set; }

        [Description("End of sowing window (d-mmm)")]
        public string EndDate { get; set; }

        [Description("Minimum extractable soil water for sowing (mm)")]
        public double MinESW { get; set; }

        [Description("Accumulated rainfall required for sowing (mm)")]
        public double MinRain { get; set; }

        [Description("Duration of rainfall accumulation (d)")]
        public int RainDays { get; set; }
        
        [Description("Required soil temp for sowing (C)")]
        public double SowTemp { get; set; } 

		[Separator("Sowing Parameters")]
        [Display(Type = DisplayType.CultivarName)]
        [Description("Cultivar to be sown")]
        public string CultivarName { get; set; }

        [Description("Sowing depth (mm)")]
        public double SowingDepth { get; set; }

        [Description("Row spacing (mm)")]
        public double RowSpacing { get; set; }

        [Description("Plant population (/m2)")]
        public double Population { get; set; }
        
        public string SimSowDate { get; set; }
        
        [EventSubscribe("StartOfSimulation")]
        private void OnSimulationCommencing(object sender, EventArgs e)
        {
            accumulatedRain = new Accumulator(this, "[Weather].Rain", RainDays);
        }

        [EventSubscribe("DoManagement")]
        private void OnDoManagement(object sender, EventArgs e)
        {
           SimSowDate = "NA";
            accumulatedRain.Update();
            if (SowDate != "NA") {
		        if (DateUtilities.WithinDates(SowDate, Clock.Today, SowDate))
		        {
		            Crop.Sow(population: Population, cultivar: CultivarName, depth: SowingDepth, rowSpacing: RowSpacing);    
		        	SimSowDate = Clock.Today.ToString("yyyy-MM-dd");
		        }
            } else if (DateUtilities.WithinDates(StartDate, Clock.Today, EndDate) &&
		            !Crop.IsAlive &&
		            MathUtilities.Sum(waterBalance.ESW) > MinESW &&
		            accumulatedRain.Sum > MinRain &&
		            CST.Value[1] >= SowTemp)
		     {
		        Crop.Sow(population: Population, cultivar: CultivarName, depth: SowingDepth, rowSpacing: RowSpacing);    
		        SimSowDate = Clock.Today.ToString("yyyy-MM-dd");
		     } 
        }
    }
}
```
      Manager Fertilise at sowing
        Crop = [Soybean]
        FertiliserType = UreaN
        Amount = 220
```csharp
using Models.Soils;
using System;
using System.Linq;
using Models.Core;
using Models.PMF;
namespace Models
{
    [Serializable]
    public class Script : Model
    {
        [Link] Clock Clock;
        [Link] Fertiliser Fertiliser;
        
        [Description("Crop to be fertilised")]
        public IPlant Crop { get; set; }

        [Description("Type of fertiliser to apply? ")] 
        public Fertiliser.Types FertiliserType { get; set; }
    
        [Description("Amount of fertiliser to be applied (kg/ha)")]
        public double Amount { get; set; }
        
        [EventSubscribe("Sowing")]
        private void OnSowing(object sender, EventArgs e)
        {
            Model crop = sender as Model;
            if (Crop != null && crop.Name.ToLower() == (Crop as IModel).Name.ToLower())
                Fertiliser.Apply(Amount: Amount, Type: FertiliserType);
        }
    }
}
```
      Manager Tillage on a fixed date
        TillageDate = 20-mar
        Fraction = 0.4
        Depth = 150
```csharp
using Models.Soils;
using System;
using System.Linq;
using Models.Core;
using Models.PMF;
using APSIM.Shared.Utilities;
using Models.Surface;

namespace Models
{
    [Serializable]
    public class Script : Model
    {
        [Link] Clock Clock;
        [Link] SurfaceOrganicMatter SOM;
        
        [Description("Tillage Date")]
        public string TillageDate { get; set; }
        
        [Description("Fraction of Residues To Incorporate (0-1)")]
        public double Fraction { get; set; }

        [Description("Depth of Tillage (mm)")]
        public double Depth { get; set; }

        [EventSubscribe("DoManagement")]
        private void OnDoManagement(object sender, EventArgs e)
        {
            if (DateUtilities.WithinDates(TillageDate, Clock.Today, TillageDate))
                SOM.Incorporate(Fraction, Depth);
        }
    }
}
```
      Manager ReaperMan
        GermWait = 30
        EmergWait = 30
        LethalFrost = -2.5
        MaxStall = 14
```csharp
using APSIM.Shared.Utilities;
using Models.Utilities;
using Models.Soils;
using Models.PMF;
using Models.Core;
using System;
using System.Linq;
using Models.Functions;
using System.Diagnostics;
using Models.Climate;

namespace Models
{
    [Serializable] 
    public class Script : Model
    {
		[Link] Clock Clock;
        [Link] Zone Zone;
        [Link] Weather Weather;
        [Link] Summary Summary;
        [Link] IEvent Events = null;
        [Link] IPlant Crop;
        
        [Separator("Triggers to kill the crop")]

        [Description("Number of days to wait before killing ungerminated plants")] 
        public int GermWait { get; set; }  
        
        [Description("Number of days to wait before killing unemerged plants")] 
        public int EmergWait { get; set; }  
        
        [Description("Kill if maximum daily tempterature is below (C)")]  
        public double LethalFrost { get; set; }
        
        [Description("Number of days to wait before killing stalled plants")] 
        public int MaxStall { get; set; }  
        public double PrevStage {get; set;}
        public int StalledFor {get; set;}  
        
        private DateTime GerminationDeadline; 
        private DateTime EmergenceDeadline; 
        
        public string SimHarvestDate {get; set;}  
        public string Result {get; set;}  
        
        [EventSubscribe("StartOfSimulation")]
        private void OnStartOfSimulation(object sender, EventArgs e)
        {
            double PrevStage = 0;
            double StalledFor = 0;
        }
        
        [EventSubscribe("Sowing")]
        private void OnSowing(object sender, EventArgs e)
        {
            GerminationDeadline = Clock.Today.AddDays(GermWait);
            EmergenceDeadline = Clock.Today.AddDays(EmergWait);
        }
		
        [EventSubscribe("DoManagement")]
        private void OnDoManagement(object sender, EventArgs e)
        {
  			bool End = false;
  			Result = "NA";
  			
            if (Crop.IsReadyForHarvesting)
            {
            	Summary.WriteMessage(this, "Result: Harvested at Maturity.", MessageType.Diagnostic);
                End = true;
                Result = "Harvested at Maturity.";
            } 
            else if (Crop.IsAlive) 
            {
	        	double Stage = (double)Crop.FindByPath("Phenology.Stage").Value; 
	        	double LAI = (double)Crop.FindByPath("Leaf.LAI").Value; 
	        	        	
		        if (Stage == PrevStage) {
		        	StalledFor += 1;
		        	if (StalledFor >= MaxStall)
		        	{
			        	Summary.WriteMessage(this, "Result: Stalled, killed.", MessageType.Diagnostic);
			        	StalledFor = 0;
			        	PrevStage = 0;
						End = true;
						Result = "Stalled, killed.";
		        	}
		        } 
		        else 
		        {
		       		StalledFor = 0;
		        }
				PrevStage = Stage;

	        	if (Clock.Today == GerminationDeadline && Stage < 2)
	               {
	               Summary.WriteMessage(this, "Result: Failed to Germinate.", MessageType.Diagnostic);
	               End = true;
	               Result = "Failed to Germinate.";
		        }
	            else if (Clock.Today == EmergenceDeadline && Stage < 3)
	               {
	               Summary.WriteMessage(this, "Result: Failed to Emerge.", MessageType.Diagnostic);
				   End = true;
				   Result = "Failed to Emerge.";
		        }
		        else if (Weather.MaxT <= LethalFrost && Stage < 9)
	               {
	               Summary.WriteMessage(this, "Result: Dead from Frost.", MessageType.Diagnostic);
				   End = true;
				   Result = "Dead from Frost.";
		        }
		        else if (LAI <= 0.001 && Stage > 4 && Stage < 10)
	               {
	               Summary.WriteMessage(this, "Result: Dead from Total Senescence (0 LAI between Flowering and Maturation).", MessageType.Diagnostic);
				   End = true;
				   Result = "Dead from Total Senescence.";
		        }
	        }
	        
	        if (End == true) {
				Crop.Harvest();
		        Crop.EndCrop();
		        SimHarvestDate = Clock.Today.ToString("yyyy-MM-dd");
	        } else {
	        	SimHarvestDate = "NA";
	        }
      	}
    }
}
```
      Report: EventNames=[Clock].DoReport
        VariableNames:
          [Clock].Today as Date
          [Clock].Today.Year as Year
          [Clock].Today.DayOfYear as DOY
          [Phenology].CurrentPhaseName as StageName
          [Phenology].Stage as Stage
          [Sowing].Script.SimSowDate as SimSowDate
          [ReaperMan].Script.SimHarvestDate as SimHarvestDate
          [Weather].Rain as Rain
          [Weather].Radn as Radn
          [Weather].MaxT as MaxT
          [Weather].MinT as MinT
          [Soybean].Phenology.ThermalTime as ThermalTime
          [Soybean].Phenology.AccumulatedEmergedTT as AccEmTT
          [Soybean].Grain.Wt*10 as Yieldkgha
          [Leaf].FRGR as FracGrowthRate
          [Photosynthesis].FN as NutrientStress
          [Photosynthesis].FT as TempStress
          [Photosynthesis].FW as WaterStress
          [ReaperMan].Script.Result as Result
  DataStore
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